# OpenSim document version 40000
ScaleTool generic:
  mass: 75
  height: 1750
  age: 30
  GenericModelMaker generic:
    model_file: /Users/rosswilkinson/Google Drive/projects/grip-no-grip/model/cyclist.osim
    marker_set_file: /Users/rosswilkinson/Google Drive/projects/grip-no-grip/model/markerSet.xml
  ModelScaler generic:
    scaling_order: measurements
    time_range: [0 2]
    preserve_mass_distribution: true
    MeasurementSet: file=(/Users/rosswilkinson/Google Drive/projects/grip-no-grip/model/measurementSet.xml)
  MarkerPlacer generic:
    time_range: [0 2]
    max_marker_movement: -1
    IKTaskSet: file=(/Users/rosswilkinson/Google Drive/projects/grip-no-grip/model/tasksScale.xml)
