# OpenSim document version 40000
Model s01modelScaledWithBicycle.osim:
  gravity: 0 -9.80665 0
  length_units: meters
  force_units: N
  credits:
    Arnold, E.M., Hamner, S.R., Ward, S.R., Lieber, R. L., and Delp, S.L.
  Ground
  BodySet:
    Body pelvis: mass=12.74043 [kg] mass_center=(-0.06970637 0 0) inertia=(0.1112096 0.09422528 0.06263655 0 0 0)
        meshes=(r_pelvis.vtp l_pelvis.vtp sacrum.vtp)
      WrapCylinder Gmax1_at_pelvis_r: xyz_body_rotation=(-0.6 0.45 0) translation=(-0.07591782 -0.1012606 0.06239289)
          quadrant=-x radius=0.04031729 length=0.1523937
      WrapCylinder Gmax2_at_pelvis_r: xyz_body_rotation=(-0.75 0.39 0) translation=(-0.07887566 -0.08489524 0.06955273)
          quadrant=all radius=0.04028394 length=0.1017585
      WrapCylinder Gmax3_at_pelvis_r: xyz_body_rotation=(-0.1 0 0) translation=(-0.0818335 -0.09000942 0.06955273)
          quadrant=all radius=0.0401756 length=0.1022834
      WrapCylinder Gmax1_at_pelvis_l: xyz_body_rotation=(0.6 -0.45 0) translation=(-0.07591782 -0.1012606 -0.06239289)
          quadrant=-x radius=0.04031729 length=0.1523937
      WrapCylinder Gmax2_at_pelvis_l: xyz_body_rotation=(0.75 -0.39 0)
          translation=(-0.07887566 -0.08489524 -0.06955273) quadrant=all radius=0.04028394 length=0.1017585
      WrapCylinder Gmax3_at_pelvis_l: xyz_body_rotation=(0.1 0 0) translation=(-0.0818335 -0.09000942 -0.06955273)
          quadrant=all radius=0.0401756 length=0.1022834
      WrapCylinder PS_at_brim_r: xyz_body_rotation=(-0.25 -0.27 0.1) translation=(-0.07295999 -0.06137006 0.06709793)
          quadrant=-y radius=0.05028654 length=0.1020254
      WrapCylinder PS_at_brim_l: xyz_body_rotation=(0.25 0.27 0.1) translation=(-0.07295999 -0.06137006 -0.06709793)
          quadrant=-y radius=0.05028654 length=0.1020254
      WrapCylinder IL_at_brim_r: xyz_body_rotation=(-0.32 -0.24 0.9) translation=(-0.07000215 -0.06648423 0.07732627)
          quadrant=-y radius=0.05520706 length=0.1020786
      WrapCylinder IL_at_brim_l: xyz_body_rotation=(0.32 0.24 0.9) translation=(-0.07000215 -0.06648423 -0.07732627)
          quadrant=-y radius=0.05520706 length=0.1020786
    Body femur_r: mass=10.06231 mass_center=(0 -0.1656816 0) inertia=(0.1448538 0.03797138 0.152751 0 0 0)
        meshes=femur_r.vtp
      WrapCylinder GasLat_at_condyles_r: translation=(0.004784612 -0.399585 0) quadrant=all radius=0.02510976
          length=0.09569224
      WrapCylinder GasMed_at_condyles_r: translation=(0.004784612 -0.399585 0) quadrant=all radius=0.024144
          length=0.09569224
      WrapCylinder KnExt_at_fem_r: xyz_body_rotation=(-0.0623366 0.0507601 0)
          translation=(0.003433705 -0.3925016 0.00200103) quadrant=all radius=0.02414315 length=0.09569914
      WrapCylinder KnExtVL_at_fem_r: xyz_body_rotation=(-0.0623366 0.0507601 0)
          translation=(0.001806937 -0.3925016 0.00200103) quadrant=all radius=0.02414315 length=0.09569914
      WrapCylinder AB_at_femshaft_r: xyz_body_rotation=(1.66157 0.186644 0)
          translation=(0.0140126 -0.1097348 0.02235849) quadrant=all radius=0.01579545 length=0.06816987
      WrapCylinder AL_at_femshaft_r: xyz_body_rotation=(1.77711 0.136489 0)
          translation=(0.02940881 -0.226018 0.01446264) quadrant=all radius=0.01924484 length=0.09735514
      WrapCylinder AMprox_at_femshaft_r: xyz_body_rotation=(1.61126 0.18656 0)
          translation=(0.004959719 -0.0710431 0.0243087) quadrant=all radius=0.02019783 length=0.0681777
      WrapCylinder AMmid_at_femshaft_r: xyz_body_rotation=(1.61139 0.13656 0)
          translation=(0.02202118 -0.1566286 0.01969748) quadrant=all radius=0.02048198 length=0.1169094
      WrapCylinder AMdist_at_femshaft_r: xyz_body_rotation=(1.71188 0.186636 0)
          translation=(0.03024497 -0.2541127 0.008961195) quadrant=all radius=0.02087131 length=0.1947319
      WrapCylinder AMisch_at_condyles_r: xyz_body_rotation=(1.71115 -0.463363 0)
          translation=(-0.02167534 -0.3672586 -0.003018487) quadrant=all radius=0.03835363 length=0.2329961
      WrapCylinder PECT_at_femshaft_r: xyz_body_rotation=(1.81295 0.276344 0)
          translation=(0.005823571 -0.08235632 0.0291292) quadrant=all radius=0.01437091 length=0.04861795
    Body tibia_r: mass=4.010795 mass_center=(0 -0.1991903 0) inertia=(0.05452301 0.005517209 0.05528027 0 0 0)
        meshes=(tibia_r.vtp r_fibula.vtp)
      WrapCylinder GasLat_at_shank_r: xyz_body_rotation=(2.96723 -0.279725 -1.47812)
          translation=(-0.006864579 -0.07895061 -0.003061231) quadrant=-y radius=0.05476024 length=0.09317985
      WrapCylinder GasMed_at_shank_r: xyz_body_rotation=(2.96723 0.0279725 -1.47812)
          translation=(-0.006864579 -0.07895061 -0.003061231) quadrant=-y radius=0.05872757 length=0.09321369
      WrapCylinder GR_at_condyles_r: xyz_body_rotation=(0 -0.4 0) translation=(-0.002782937 -0.021338 0) quadrant=all
          radius=0.03590183 length=0.09276458
      WrapCylinder SM_at_condyles_r: xyz_body_rotation=(0 -0.1 0) translation=(-0.0009276458 -0.021338 0) quadrant=all
          radius=0.03440592 length=0.09276458
      WrapCylinder ST_at_condyles_r: xyz_body_rotation=(0 -0.2 0) translation=(-0.001855292 -0.02187145 0) quadrant=all
          radius=0.0423841 length=0.09276458
      WrapCylinder BF140_at_gastroc_r: translation=(-0.03617819 -0.06401401 0) quadrant=y radius=0.02892092
          length=0.1391469
    Body patella_r: mass=0.09325166 mass_center=(0.00172246 0.02572938 0)
        inertia=(3.104783e-6 1.418247e-5 1.418247e-5 0 0 0) meshes=r_patella.vtp
    Body talus_r: mass=0.1081806 mass_center=(0 0 0) inertia=(0.001081806 0.001081806 0.001081806 0 0 0)
        meshes=r_talus.vtp
    Body calcn_r: mass=1.352257 mass_center=(0.09125447 0.02737634 0)
        inertia=(0.001514528 0.004219042 0.004435404 0 0 0) meshes=r_foot.vtp
    Body toes_r: mass=0.2343191 mass_center=(0.03157405 0.005475268 -0.01705861)
        inertia=(0.0001081806 0.0002163612 0.001081806 0 0 0) meshes=r_bofoot.vtp
    Body torso: mass=29.02117 mass_center=(-0.03118763 0.3194861 0) inertia=(1.595123 0.8173042 1.548497 0 0 0)
        meshes=(hat_spine.vtp hat_jaw.vtp hat_skull.vtp hat_ribs_scap.vtp)
    Body femur_l: mass=10.06231 mass_center=(0 -0.1654827 0) inertia=(0.1448538 0.03797138 0.152751 0 0 0)
        meshes=femur_l.vtp
      WrapCylinder GasLat_at_condyles_l: translation=(0.004957579 -0.3991054 0) quadrant=all radius=0.02554427
          length=0.09915158
      WrapCylinder GasMed_at_condyles_l: translation=(0.004957579 -0.3991054 0) quadrant=all radius=0.0245618
          length=0.09915158
      WrapCylinder KnExt_at_fem_l: xyz_body_rotation=(0.0623366 -0.0507601 0)
          translation=(0.003557836 -0.3920305 -0.002073369) quadrant=all radius=0.02456268 length=0.09914464
      WrapCylinder KnExtVL_at_fem_l: xyz_body_rotation=(0.0623366 -0.0507601 0)
          translation=(0.001872259 -0.3920305 -0.002073369) quadrant=all radius=0.02456268 length=0.09914464
      WrapCylinder AB_at_femshaft_l: xyz_body_rotation=(-1.66157 -0.186644 0)
          translation=(0.01451916 -0.1096031 -0.02316677) quadrant=all radius=0.01635374 length=0.06819407
      WrapCylinder AL_at_femshaft_l: xyz_body_rotation=(-1.77711 -0.136489 0)
          translation=(0.03047196 -0.2257467 -0.01498547) quadrant=all radius=0.01991871 length=0.09745171
      WrapCylinder AMprox_at_femshaft_l: xyz_body_rotation=(-1.61126 -0.18656 0)
          translation=(0.005139017 -0.07095783 -0.02518748) quadrant=all radius=0.02091418 length=0.06818592
      WrapCylinder AMmid_at_femshaft_l: xyz_body_rotation=(-1.61139 -0.13656 0)
          translation=(0.02281726 -0.1564406 -0.02040956) quadrant=all radius=0.02121457 length=0.1168555
      WrapCylinder AMdist_at_femshaft_l: xyz_body_rotation=(-1.71188 -0.186636 0)
          translation=(0.03133834 -0.2538077 -0.009285149) quadrant=all radius=0.02160459 length=0.1948809
      WrapCylinder AMisch_at_condyles_l: xyz_body_rotation=(-1.71115 0.463363 0)
          translation=(-0.02245892 -0.3668178 0.003127608) quadrant=all radius=0.03958328 length=0.2345647
      WrapCylinder PECT_at_femshaft_l: xyz_body_rotation=(-1.81295 -0.276344 0)
          translation=(0.006034098 -0.08225748 -0.03018224) quadrant=all radius=0.01485557 length=0.04878778
    Body tibia_l: mass=4.010795 mass_center=(0 -0.2001111 0) inertia=(0.05452301 0.005517209 0.05528027 0 0 0)
        meshes=(tibia_l.vtp l_fibula.vtp)
      WrapCylinder GasLat_at_shank_l: xyz_body_rotation=(-2.96723 0.279725 -1.47812)
          translation=(-0.006771421 -0.07931561 0.003019688) quadrant=-y radius=0.05454079 length=0.09197766
      WrapCylinder GasMed_at_shank_l: xyz_body_rotation=(-2.96723 -0.0279725 -1.47812)
          translation=(-0.006771421 -0.07931561 0.003019688) quadrant=-y radius=0.05848936 length=0.0920161
      WrapCylinder GR_at_condyles_l: xyz_body_rotation=(0 0.4 0) translation=(-0.002745171 -0.02143665 0) quadrant=all
          radius=0.03576401 length=0.09150568
      WrapCylinder SM_at_condyles_l: xyz_body_rotation=(0 0.1 0) translation=(-0.0009150568 -0.02143665 0) quadrant=all
          radius=0.03427384 length=0.09150568
      WrapCylinder ST_at_condyles_l: xyz_body_rotation=(0 0.2 0) translation=(-0.001830114 -0.02197257 0) quadrant=all
          radius=0.0422214 length=0.09150568
      WrapCylinder BF140_at_gastroc_l: translation=(-0.03568722 -0.06430995 0) quadrant=all radius=0.0288099
          length=0.1372585
    Body patella_l: mass=0.09325166 mass_center=(0.001784728 0.02569849 0)
        inertia=(3.104783e-6 1.418247e-5 1.418247e-5 0 0 0) meshes=patella_l.vtp
    Body talus_l: mass=0.1081806 mass_center=(0 0 0) inertia=(0.001081806 0.001081806 0.001081806 0 0 0)
        meshes=l_talus.vtp
    Body calcn_l: mass=1.352257 mass_center=(0.09297263 0.02789179 0)
        inertia=(0.001514528 0.004219042 0.004435404 0 0 0) meshes=l_foot.vtp
    Body toes_l: mass=0.2343191 mass_center=(0.03216853 0.005578358 0.01688187)
        inertia=(0.0001081806 0.0002163612 0.001081806 0 0 0) meshes=l_bofoot.vtp
    Body humerus_r: mass=2.19877 mass_center=(0 -0.144895 0) inertia=(0.0100262 0.003458727 0.01125408 0 0 0)
        meshes=humerus_rv.vtp
      WrapCylinder TRI: xyz_body_rotation=(-0.14015 -0.00628319 0.154985)
          translation=(0.002466268 -0.2571084 -0.006077588) quadrant=all radius=0.01409296 length=0.04404049
    Body ulna_r: mass=0.657197 mass_center=(0 -0.1336596 0) inertia=(0.003940766 0.0008222125 0.004274707 0 0 0)
        meshes=ulna_rv.vtp
    Body radius_r: mass=0.657197 mass_center=(0 -0.1336596 0) inertia=(0.003940766 0.0008222125 0.004274707 0 0 0)
        meshes=radius_rv.vtp
    Body hand_r: mass=0.4949261 mass_center=(0 -0.0755159 0) inertia=(0.001186753 0.0007277512 0.001782791 0 0 0)
        meshes=(pisiform_rvs.vtp lunate_rvs.vtp scaphoid_rvs.vtp triquetrum_rvs.vtp hamate_rvs.vtp capitate_rvs.vtp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)
    Body humerus_l: mass=2.19877 mass_center=(0 -0.1456368 0) inertia=(0.01012912 0.003494232 0.01136961 0 0 0)
        meshes=humerus_lv.vtp
    Body ulna_l: mass=0.657197 mass_center=(0 -0.1292986 0) inertia=(0.003687801 0.0007694331 0.004000305 0 0 0)
        meshes=ulna_lv.vtp
    Body radius_l: mass=0.657197 mass_center=(0 -0.1292986 0) inertia=(0.003687801 0.0007694331 0.004000305 0 0 0)
        meshes=radius_lv.vtp
    Body hand_l: mass=0.4949261 mass_center=(0 -0.07305194 0) inertia=(0.001110573 0.0006810355 0.00166835 0 0 0)
        meshes=(pisiform_lvs.vtp lunate_lvs.vtp scaphoid_lvs.vtp triquetrum_lvs.vtp hamate_lvs.vtp capitate_lvs.vtp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)
    Body RearWheel: mass=0.1 inertia=(0 0 0 0 0 0)
      Cylinder RearWheel_geom_1: radius=0.35 half_height=0.0115
    Body rightChainstay: mass=0.1 inertia=(0 0 0 0 0 0)
      Cylinder rightChainstay_geom_1: radius=0.012 half_height=0.205
    Body leftChainstay: mass=0.1 inertia=(0 0 0 0 0 0)
      Cylinder leftChainstay_geom_1: radius=0.012 half_height=0.205
    Body bottomBracket: mass=0.1 inertia=(0 0 0 0 0 0)
      Cylinder bottomBracket_geom_1: radius=0.021 half_height=0.0365
    Body seatTube: mass=0.1 inertia=(0 0 0 0 0 0)
      Cylinder seatTube_geom_1: radius=0.012 half_height=0.2405
    Body downTube: mass=0.1 inertia=(0 0 0 0 0 0)
      Cylinder downTube_geom_1: radius=0.012 half_height=0.29
    Body topTube: mass=0.1 inertia=(0 0 0 0 0 0)
      Cylinder topTube_geom_1: radius=0.012 half_height=0.27
    Body headTube: mass=0.1 inertia=(0 0 0 0 0 0)
      Cylinder headTube_geom_1: radius=0.021 half_height=0.0715
    Body leftSeatstay: mass=0.1 inertia=(0 0 0 0 0 0)
      Cylinder leftSeatstay_geom_1: radius=0.012 half_height=0.225
    Body rightSeatstay: mass=0.1 inertia=(0 0 0 0 0 0)
      Cylinder rightSeatstay_geom_1: radius=0.012 half_height=0.225
    Body steeringTube: mass=0.1 inertia=(0 0 0 0 0 0)
      Cylinder steeringTube_geom_1: radius=0.012 half_height=0.0915
    Body stem: mass=0.1 inertia=(0 0 0 0 0 0)
      Cylinder stem_geom_1: radius=0.012 half_height=0.05
    Body handlebar: mass=0.1 inertia=(0 0 0 0 0 0)
      Cylinder handlebar_geom_1: radius=0.012 half_height=0.21
    Body leftHood: mass=0.1 inertia=(0 0 0 0 0 0)
      Cylinder leftHood_geom_1: radius=0.012 half_height=0.05
    Body rightHood: mass=0.1 inertia=(0 0 0 0 0 0)
      Cylinder rightHood_geom_1: radius=0.012 half_height=0.05
    Body leftDrop: mass=0.1 inertia=(0 0 0 0 0 0)
      Cylinder leftDrop_geom_1: radius=0.012 half_height=0.0375
    Body leftDrop2: mass=0.1 inertia=(0 0 0 0 0 0)
      Cylinder leftDrop2_geom_1: radius=0.012 half_height=0.0375
    Body rightDrop: mass=0.1 inertia=(0 0 0 0 0 0)
      Cylinder rightDrop_geom_1: radius=0.012 half_height=0.0375
    Body rightDrop2: mass=0.1 inertia=(0 0 0 0 0 0)
      Cylinder rightDrop2_geom_1: radius=0.012 half_height=0.0375
    Body leftFork: mass=0.1 inertia=(0 0 0 0 0 0)
      Cylinder leftFork_geom_1: radius=0.012 half_height=0.1815
    Body rightFork: mass=0.1 inertia=(0 0 0 0 0 0)
      Cylinder rightFork_geom_1: radius=0.012 half_height=0.1815
    Body frontWheel: mass=0.1 inertia=(0 0 0 0 0 0)
      Cylinder frontWheel_geom_1: radius=0.35 half_height=0.0115
    Body seatpost: mass=0.1 inertia=(0 0 0 0 0 0)
      Cylinder seatpost_geom_1: radius=0.0096 half_height=0.19
    Body saddle: mass=0.1 inertia=(0 0 0 0 0 0)
      Ellipsoid saddle_geom_1: radii=(0.09 0.01 0.0665)
    Body crankSpindle: mass=0.1 inertia=(0 0 0 0 0 0)
      Cylinder crankSpindle_geom_1: radius=0.012 half_height=0.075
    Body leftCrank: mass=0.1 inertia=(0 0 0 0 0 0)
      Brick leftCrank_geom_1: half_lengths=(0.0875 0.015 0.005)
    Body leftPedal: mass=0.1 inertia=(0 0 0 0 0 0)
      Brick leftPedal_geom_1: half_lengths=(0.03 0.005 0.02)
    Body rightCrank: mass=0.1 inertia=(0 0 0 0 0 0)
      Brick rightCrank_geom_1: half_lengths=(0.0875 0.015 0.005)
    Body rightPedal: mass=0.1 inertia=(0 0 0 0 0 0)
      Brick rightPedal_geom_1: half_lengths=(0.03 0.005 0.02)
  JointSet:
    CustomJoint ground_pelvis: socket_parent_frame=ground_offset socket_child_frame=pelvis_offset
      Coordinate pelvis_tilt: default_value=-0.3490659 range=(-1.570796 1.570796) clamped=true
      Coordinate pelvis_list: default_value=0 range=(-1.570796 1.570796) clamped=true
      Coordinate pelvis_rotation: default_value=0 range=(-1.570796 1.570796) clamped=true
      Coordinate pelvis_tx: default_value=0.67 range=(-5 5) clamped=true
      Coordinate pelvis_ty: default_value=1.2 range=(-1 2) clamped=true
      Coordinate pelvis_tz: default_value=0 range=(-3 3) clamped=true
      PhysicalOffsetFrame ground_offset: socket_parent=/ground translation=(0 0 0) [meters]
      PhysicalOffsetFrame pelvis_offset: socket_parent=/bodyset/pelvis translation=(0 0 0)
      SpatialTransform:
        TransformAxis rotation1: coordinates=pelvis_tilt axis=(0 0 1) LinearFunction(coefficients=1 0)
        TransformAxis rotation2: coordinates=pelvis_list axis=(1 0 0) LinearFunction(coefficients=1 0)
        TransformAxis rotation3: coordinates=pelvis_rotation axis=(0 1 0) LinearFunction(coefficients=1 0)
        TransformAxis translation1: coordinates=pelvis_tx axis=(1 0 0) LinearFunction(coefficients=1 0)
        TransformAxis translation2: coordinates=pelvis_ty axis=(0 1 0) LinearFunction(coefficients=1 0)
        TransformAxis translation3: coordinates=pelvis_tz axis=(0 0 1) LinearFunction(coefficients=1 0)
    CustomJoint hip_r: socket_parent_frame=pelvis_offset socket_child_frame=femur_r_offset
      Coordinate hip_flexion_r: default_value=0.5235988 range=(-0.5235988 2.094395) clamped=true
      Coordinate hip_adduction_r: default_value=-0.1047198 range=(-0.8726646 0.5235988) clamped=true
      Coordinate hip_rotation_r: default_value=0 range=(-0.6981317 0.6981317) clamped=true
      PhysicalOffsetFrame pelvis_offset: socket_parent=/bodyset/pelvis translation=(-0.05548508 -0.08028226 0.07902418)
      PhysicalOffsetFrame femur_r_offset: socket_parent=/bodyset/femur_r translation=(0 0 0)
      SpatialTransform: axes_held_at_zero=(translation1 translation2 translation3)
        TransformAxis rotation1: coordinates=hip_flexion_r axis=(0 0 1) LinearFunction(coefficients=1 0)
        TransformAxis rotation2: coordinates=hip_adduction_r axis=(1 0 0) LinearFunction(coefficients=1 0)
        TransformAxis rotation3: coordinates=hip_rotation_r axis=(0 1 0) LinearFunction(coefficients=1 0)
    CustomJoint walker_knee_r: socket_parent_frame=femur_r_offset socket_child_frame=tibia_r_offset
      Coordinate knee_angle_r: default_value=0.5235988 range=(0 2.443461) clamped=true
      PhysicalOffsetFrame femur_r_offset: socket_parent=/bodyset/femur_r
          translation=(-0.004306151 -0.3991952 -0.001674614) orientation=(-1.64157 1.44618 1.5708) [radians]
      PhysicalOffsetFrame tibia_r_offset: socket_parent=/bodyset/tibia_r
          translation=(-0.007504228 -0.003771279 -0.001377313) orientation=(-1.64157 1.44618 1.5708)
      SpatialTransform:
        TransformAxis rotation1: coordinates=knee_angle_r axis=(1 0 0) LinearFunction(coefficients=1 0)
        TransformAxis rotation2: coordinates=knee_angle_r axis=(0 0 1)
          SimmSpline: x=(0 0.174533 0.349066 0.523599 0.698132 0.872665 1.0472 1.22173 1.39626 1.5708 1.74533 1.91986 2.0944)
              y=(0 0.0126809 0.0226969 0.0296054 0.0332049 0.0335354 0.0308779 0.0257548 0.0189295 0.011407 0.00443314 -0.00050475 -0.0016782)
        TransformAxis rotation3: coordinates=knee_angle_r axis=(0 1 0)
          SimmSpline: x=(0 0.174533 0.349066 0.523599 0.698132 0.872665 1.0472 1.22173 1.39626 1.5708 1.74533 1.91986 2.0944)
              y=(0 0.059461 0.109399 0.150618 0.18392 0.210107 0.229983 0.24435 0.254012 0.25977 0.262428 0.262788 0.261654)
        TransformAxis translation1: coordinates=knee_angle_r axis=(1 0 0)
          MultiplierFunction: scale=0.9569224
            SimmSpline: x=(0 0.174533 0.349066 0.523599 0.698132 0.872665 1.0472 1.22173 1.39626 1.5708 1.74533 1.91986 2.0944)
                y=(0 5.3e-5 0.000188 0.000378 0.000597 0.000825 0.001045 0.001247 0.00142 0.001558 0.001661 0.001728 0.00176)
        TransformAxis translation2: coordinates=knee_angle_r axis=(0 1 0)
          MultiplierFunction: scale=0.9745976
            SimmSpline: x=(0 0.174533 0.349066 0.523599 0.698132 0.872665 1.0472 1.22173 1.39626 1.5708 1.74533 1.91986 2.0944)
                y=(0 0.000301 0.000143 -0.000401 -0.001233 -0.002243 -0.003316 -0.004346 -0.005239 -0.005924 -0.006361 -0.006539 -0.00648)
        TransformAxis translation3: coordinates=knee_angle_r axis=(0 0 1)
          MultiplierFunction: scale=0.9569224
            SimmSpline: x=(0 0.174533 0.349066 0.523599 0.698132 0.872665 1.0472 1.22173 1.39626 1.5708 1.74533 1.91986 2.0944)
                y=(0 0.001055 0.002061 0.00289 0.003447 0.003676 0.003559 0.00311 0.002373 0.001418 0.000329 -0.000805 -0.001898)
    CustomJoint patellofemoral_r: socket_parent_frame=femur_r_offset socket_child_frame=patella_r_offset
      Coordinate knee_angle_r_beta: default_value=7.081844e-5 range=(-99999.9 99999.9) clamped=false
      PhysicalOffsetFrame femur_r_offset: socket_parent=/bodyset/femur_r
          translation=(-0.007741502 -0.3975968 -0.002631537)
      PhysicalOffsetFrame patella_r_offset: socket_parent=/bodyset/patella_r translation=(0 0 0)
      SpatialTransform: axes_held_at_zero=(rotation2 rotation3)
        TransformAxis rotation1: coordinates=knee_angle_r_beta axis=(0 0 1)
          SimmSpline: x=(0 0.174533 0.349066 0.523599 0.698132 0.872665 1.0472 1.22173 1.39626 1.5708 1.74533 1.91986 2.0944)
              y=(0.00113686 -0.00629212 -0.105582 -0.253683 -0.414245 -0.579047 -0.747244 -0.91799 -1.09044 -1.26379 -1.43763 -1.61186 -1.78634)
        TransformAxis translation1: coordinates=knee_angle_r_beta axis=(1 0 0)
          MultiplierFunction: scale=0.9569224
            SimmSpline: x=(0 0.174533 0.349066 0.523599 0.698132 0.872665 1.0472 1.22173 1.39626 1.5708 1.74533 1.91986 2.0944)
                y=(0.0524 0.0488 0.0437 0.0371 0.0296 0.0216 0.0136 0.0057 -0.0019 -0.0088 -0.0148 -0.0196 -0.0227)
        TransformAxis translation2: coordinates=knee_angle_r_beta axis=(0 1 0)
          MultiplierFunction: scale=0.9745976
            SimmSpline: x=(0 0.174533 0.349066 0.523599 0.698132 0.872665 1.0472 1.22173 1.39626 1.5708 1.74533 1.91986 2.0944)
                y=(-0.0108 -0.019 -0.0263 -0.0322 -0.0367 -0.0395 -0.0408 -0.0404 -0.0384 -0.0349 -0.0301 -0.0245 -0.0187)
        TransformAxis translation3: axis=(0 0 1) MultiplierFunction(scale=0.9569224, Constant(value=0.00275))
    PinJoint ankle_r: socket_parent_frame=tibia_r_offset socket_child_frame=talus_r_offset
      Coordinate ankle_angle_r: default_value=0.1745329 range=(-0.6981317 0.5235988) clamped=true
      PhysicalOffsetFrame tibia_r_offset: socket_parent=/bodyset/tibia_r translation=(-0.009276458 -0.42676 0)
          orientation=(0.175895 -0.105208 0.0186622)
      PhysicalOffsetFrame talus_r_offset: socket_parent=/bodyset/talus_r translation=(0 0 0)
          orientation=(0.175895 -0.105208 0.0186622)
    PinJoint subtalar_r: socket_parent_frame=talus_r_offset socket_child_frame=calcn_r_offset
      Coordinate subtalar_angle_r: default_value=0 range=(-0.6108652 0.6108652) clamped=true
      PhysicalOffsetFrame talus_r_offset: socket_parent=/bodyset/talus_r
          translation=(-0.04524128 -0.04475646 0.007346955) orientation=(-1.76819 0.906223 1.8196)
      PhysicalOffsetFrame calcn_r_offset: socket_parent=/bodyset/calcn_r translation=(0 0 0)
          orientation=(-1.76819 0.906223 1.8196)
    PinJoint mtp_r: socket_parent_frame=calcn_r_offset socket_child_frame=toes_r_offset
      Coordinate mtp_angle_r: default_value=-0.3490659 range=(-0.5235988 0.5235988) clamped=true locked=true
      PhysicalOffsetFrame calcn_r_offset: socket_parent=/bodyset/calcn_r translation=(0.163163 -0.001825089 0.00105276)
          orientation=(-3.14159 0.619901 0)
      PhysicalOffsetFrame toes_r_offset: socket_parent=/bodyset/toes_r translation=(0 0 0)
          orientation=(-3.14159 0.619901 0)
    CustomJoint hip_l: socket_parent_frame=pelvis_offset socket_child_frame=femur_l_offset
      Coordinate hip_flexion_l: default_value=0.1396263 range=(-0.5235988 2.094395) clamped=true
      Coordinate hip_adduction_l: default_value=-0.1047198 range=(-0.8726646 0.5235988) clamped=true
      Coordinate hip_rotation_l: default_value=0 range=(-0.6981317 0.6981317) clamped=true
      PhysicalOffsetFrame pelvis_offset: socket_parent=/bodyset/pelvis
          translation=(-0.05548508 -0.08028226 -0.07902418)
      PhysicalOffsetFrame femur_l_offset: socket_parent=/bodyset/femur_l translation=(0 0 0)
      SpatialTransform: axes_held_at_zero=(translation1 translation2 translation3)
        TransformAxis rotation1: coordinates=hip_flexion_l axis=(0 0 1) LinearFunction(coefficients=1 0)
        TransformAxis rotation2: coordinates=hip_adduction_l axis=(1 0 0) LinearFunction(coefficients=-1 0)
        TransformAxis rotation3: coordinates=hip_rotation_l axis=(0 1 0) LinearFunction(coefficients=-1 0)
    CustomJoint walker_knee_l: socket_parent_frame=femur_l_offset socket_child_frame=tibia_l_offset
      Coordinate knee_angle_l: default_value=0.5235988 range=(0 2.443461) clamped=true
      PhysicalOffsetFrame femur_l_offset: socket_parent=/bodyset/femur_l
          translation=(-0.004461821 -0.398716 0.001735153) orientation=(1.64157 -1.44618 1.5708)
      PhysicalOffsetFrame tibia_l_offset: socket_parent=/bodyset/tibia_l
          translation=(-0.007402389 -0.003788714 0.001358621) orientation=(1.64157 -1.44618 1.5708)
      SpatialTransform:
        TransformAxis rotation1: coordinates=knee_angle_l axis=(-1 0 0) LinearFunction(coefficients=1 0)
        TransformAxis rotation2: coordinates=knee_angle_l axis=(0 0 1)
          SimmSpline: x=(0 0.174533 0.349066 0.523599 0.698132 0.872665 1.0472 1.22173 1.39626 1.5708 1.74533 1.91986 2.0944)
              y=(0 0.0126809 0.0226969 0.0296054 0.0332049 0.0335354 0.0308779 0.0257548 0.0189295 0.011407 0.00443314 -0.00050475 -0.0016782)
        TransformAxis rotation3: coordinates=knee_angle_l axis=(0 1 0)
          SimmSpline: x=(0 0.174533 0.349066 0.523599 0.698132 0.872665 1.0472 1.22173 1.39626 1.5708 1.74533 1.91986 2.0944)
              y=(0 -0.059461 -0.109399 -0.150618 -0.18392 -0.210107 -0.229983 -0.24435 -0.254012 -0.25977 -0.262428 -0.262788 -0.261654)
        TransformAxis translation1: coordinates=knee_angle_l axis=(1 0 0)
          MultiplierFunction: scale=0.9915158
            SimmSpline: x=(0 0.174533 0.349066 0.523599 0.698132 0.872665 1.0472 1.22173 1.39626 1.5708 1.74533 1.91986 2.0944)
                y=(0 5.3e-5 0.000188 0.000378 0.000597 0.000825 0.001045 0.001247 0.00142 0.001558 0.001661 0.001728 0.00176)
        TransformAxis translation2: coordinates=knee_angle_l axis=(0 1 0)
          MultiplierFunction: scale=0.9734278
            SimmSpline: x=(0 0.174533 0.349066 0.523599 0.698132 0.872665 1.0472 1.22173 1.39626 1.5708 1.74533 1.91986 2.0944)
                y=(0 0.000301 0.000143 -0.000401 -0.001233 -0.002243 -0.003316 -0.004346 -0.005239 -0.005924 -0.006361 -0.006539 -0.00648)
        TransformAxis translation3: coordinates=knee_angle_l axis=(0 0 1)
          MultiplierFunction: scale=0.9915158
            SimmSpline: x=(0 0.174533 0.349066 0.523599 0.698132 0.872665 1.0472 1.22173 1.39626 1.5708 1.74533 1.91986 2.0944)
                y=(0 -0.001055 -0.002061 -0.00289 -0.003447 -0.003676 -0.003559 -0.00311 -0.002373 -0.001418 -0.000329 0.000805 0.001898)
    CustomJoint patellofemoral_l: socket_parent_frame=femur_l_offset socket_child_frame=patella_l_offset
      Coordinate knee_angle_l_beta: default_value=7.081844e-5 range=(-99999.9 99999.9) clamped=false
      PhysicalOffsetFrame femur_l_offset: socket_parent=/bodyset/femur_l
          translation=(-0.008021363 -0.3971196 0.002726669)
      PhysicalOffsetFrame patella_l_offset: socket_parent=/bodyset/patella_l translation=(0 0 0)
      SpatialTransform: axes_held_at_zero=(rotation2 rotation3)
        TransformAxis rotation1: coordinates=knee_angle_l_beta axis=(0 0 1)
          SimmSpline: x=(0 0.174533 0.349066 0.523599 0.698132 0.872665 1.0472 1.22173 1.39626 1.5708 1.74533 1.91986 2.0944)
              y=(0.00113686 -0.00629212 -0.105582 -0.253683 -0.414245 -0.579047 -0.747244 -0.91799 -1.09044 -1.26379 -1.43763 -1.61186 -1.78634)
        TransformAxis translation1: coordinates=knee_angle_l_beta axis=(1 0 0)
          MultiplierFunction: scale=0.9915158
            SimmSpline: x=(0 0.174533 0.349066 0.523599 0.698132 0.872665 1.0472 1.22173 1.39626 1.5708 1.74533 1.91986 2.0944)
                y=(0.0524 0.0488 0.0437 0.0371 0.0296 0.0216 0.0136 0.0057 -0.0019 -0.0088 -0.0148 -0.0196 -0.0227)
        TransformAxis translation2: coordinates=knee_angle_l_beta axis=(0 1 0)
          MultiplierFunction: scale=0.9734278
            SimmSpline: x=(0 0.174533 0.349066 0.523599 0.698132 0.872665 1.0472 1.22173 1.39626 1.5708 1.74533 1.91986 2.0944)
                y=(-0.0108 -0.019 -0.0263 -0.0322 -0.0367 -0.0395 -0.0408 -0.0404 -0.0384 -0.0349 -0.0301 -0.0245 -0.0187)
        TransformAxis translation3: axis=(0 0 1) MultiplierFunction(scale=0.9915158, Constant(value=-0.00275))
    PinJoint ankle_l: socket_parent_frame=tibia_l_offset socket_child_frame=talus_l_offset
      Coordinate ankle_angle_l: default_value=0.3490659 range=(-0.6981317 0.5235988) clamped=true
      PhysicalOffsetFrame tibia_l_offset: socket_parent=/bodyset/tibia_l translation=(-0.009150568 -0.428733 0)
          orientation=(-0.175895 0.105208 0.0186622)
      PhysicalOffsetFrame talus_l_offset: socket_parent=/bodyset/talus_l translation=(0 0 0)
          orientation=(-0.175895 0.105208 0.0186622)
    PinJoint subtalar_l: socket_parent_frame=talus_l_offset socket_child_frame=calcn_l_offset
      Coordinate subtalar_angle_l: default_value=0 range=(-0.6108652 0.6108652) clamped=true
      PhysicalOffsetFrame talus_l_offset: socket_parent=/bodyset/talus_l
          translation=(-0.04462732 -0.04496338 -0.00724725) orientation=(1.76819 -0.906223 1.8196)
      PhysicalOffsetFrame calcn_l_offset: socket_parent=/bodyset/calcn_l translation=(0 0 0)
          orientation=(1.76819 -0.906223 1.8196)
    PinJoint mtp_l: socket_parent_frame=calcn_l_offset socket_child_frame=toes_l_offset
      Coordinate mtp_angle_l: default_value=-0.3490659 range=(-0.5235988 0.5235988) clamped=true locked=true
      PhysicalOffsetFrame calcn_l_offset: socket_parent=/bodyset/calcn_l
          translation=(0.1662351 -0.001859453 -0.001041852) orientation=(-3.14159 -0.619901 0)
      PhysicalOffsetFrame toes_l_offset: socket_parent=/bodyset/toes_l translation=(0 0 0)
          orientation=(-3.14159 -0.619901 0)
    CustomJoint back: socket_parent_frame=pelvis_offset socket_child_frame=torso_offset
      Coordinate lumbar_extension: default_value=-1.396263 range=(-1.570796 1.570796) clamped=true
      Coordinate lumbar_bending: default_value=-3.557008e-10 range=(-1.570796 1.570796) clamped=true
      Coordinate lumbar_rotation: default_value=0 range=(-1.570796 1.570796) clamped=true
      PhysicalOffsetFrame pelvis_offset: socket_parent=/bodyset/pelvis translation=(-0.09928474 0.08336099 0)
      PhysicalOffsetFrame torso_offset: socket_parent=/bodyset/torso translation=(0 0 0)
      SpatialTransform: axes_held_at_zero=(translation1 translation2 translation3)
        TransformAxis rotation1: coordinates=lumbar_extension axis=(0 0 1) LinearFunction(coefficients=1 0)
        TransformAxis rotation2: coordinates=lumbar_bending axis=(1 0 0) LinearFunction(coefficients=1 0)
        TransformAxis rotation3: coordinates=lumbar_rotation axis=(0 1 0) LinearFunction(coefficients=1 0)
    CustomJoint acromial_r: socket_parent_frame=torso_offset socket_child_frame=humerus_r_offset
      Coordinate arm_flex_r: default_value=1.832596 range=(-1.570796 2.094395) clamped=true
      Coordinate arm_add_r: default_value=-0.1047198 range=(-2.094395 1.570796) clamped=true
      Coordinate arm_rot_r: default_value=0 range=(-1.570796 1.570796) clamped=true
      PhysicalOffsetFrame torso_offset: socket_parent=/bodyset/torso translation=(0.0032799 0.3709034 0.2055289)
      PhysicalOffsetFrame humerus_r_offset: socket_parent=/bodyset/humerus_r translation=(0 0 0)
      SpatialTransform: axes_held_at_zero=(translation1 translation2 translation3)
        TransformAxis rotation1: coordinates=arm_flex_r axis=(0 0 1) LinearFunction(coefficients=1 0)
        TransformAxis rotation2: coordinates=arm_add_r axis=(1 0 0) LinearFunction(coefficients=1 0)
        TransformAxis rotation3: coordinates=arm_rot_r axis=(0 1 0) LinearFunction(coefficients=1 0)
    PinJoint elbow_r: socket_parent_frame=humerus_r_offset socket_child_frame=ulna_r_offset
      Coordinate elbow_flex_r: default_value=0.08726646 range=(0 2.618) clamped=true
      PhysicalOffsetFrame humerus_r_offset: socket_parent=/bodyset/humerus_r
          translation=(0.01157737 -0.2521521 -0.008451371) orientation=(-0.0228627 0.228018 0.0051689)
      PhysicalOffsetFrame ulna_r_offset: socket_parent=/bodyset/ulna_r translation=(0 0 0)
          orientation=(-0.0228627 0.228018 0.0051689)
    PinJoint radioulnar_r: socket_parent_frame=ulna_r_offset socket_child_frame=radius_r_offset
      Coordinate pro_sup_r: default_value=1.570796 range=(0 3.141593) clamped=true
      PhysicalOffsetFrame ulna_r_offset: socket_parent=/bodyset/ulna_r
          translation=(-0.007460099 -0.01442448 0.02892549) orientation=(-1.56884 0.056428 1.53614)
      PhysicalOffsetFrame radius_r_offset: socket_parent=/bodyset/radius_r translation=(0 0 0)
          orientation=(-1.56884 0.056428 1.53614)
    UniversalJoint radius_hand_r: socket_parent_frame=radius_r_offset socket_child_frame=hand_r_offset
      Coordinate wrist_flex_r: default_value=0 range=(-1.22173 1.22173) clamped=true locked=true
      Coordinate wrist_dev_r: default_value=0 range=(-0.4363323 0.6108652) clamped=true locked=true
      PhysicalOffsetFrame radius_r_offset: socket_parent=/bodyset/radius_r
          translation=(-0.009755685 -0.2615426 0.0150932) orientation=(-1.5708 0 -1.5708)
      PhysicalOffsetFrame hand_r_offset: socket_parent=/bodyset/hand_r translation=(0 0 0)
          orientation=(-1.5708 0 -1.5708)
    CustomJoint acromial_l: socket_parent_frame=torso_offset socket_child_frame=humerus_l_offset
      Coordinate arm_flex_l: default_value=1.832596 range=(-1.570796 2.094395) clamped=true
      Coordinate arm_add_l: default_value=-0.1047198 range=(-2.094395 1.570796) clamped=true
      Coordinate arm_rot_l: default_value=0 range=(-1.570796 1.570796) clamped=true
      PhysicalOffsetFrame torso_offset: socket_parent=/bodyset/torso translation=(0.0032799 0.3709034 -0.2055289)
      PhysicalOffsetFrame humerus_l_offset: socket_parent=/bodyset/humerus_l translation=(0 0 0)
      SpatialTransform: axes_held_at_zero=(translation1 translation2 translation3)
        TransformAxis rotation1: coordinates=arm_flex_l axis=(0 0 1) LinearFunction(coefficients=1 0)
        TransformAxis rotation2: coordinates=arm_add_l axis=(-1 0 0) LinearFunction(coefficients=1 0)
        TransformAxis rotation3: coordinates=arm_rot_l axis=(0 -1 0) LinearFunction(coefficients=1 0)
    PinJoint elbow_l: socket_parent_frame=humerus_l_offset socket_child_frame=ulna_l_offset
      Coordinate elbow_flex_l: default_value=0.08726646 range=(0 2.618) clamped=true
      PhysicalOffsetFrame humerus_l_offset: socket_parent=/bodyset/humerus_l
          translation=(0.01163664 -0.253443 0.008494639) orientation=(0.0228627 -0.228018 0.0051689)
      PhysicalOffsetFrame ulna_l_offset: socket_parent=/bodyset/ulna_l translation=(0 0 0)
          orientation=(0.0228627 -0.228018 0.0051689)
    PinJoint radioulnar_l: socket_parent_frame=ulna_l_offset socket_child_frame=radius_l_offset
      Coordinate pro_sup_l: default_value=1.570796 range=(0 3.141593) clamped=true
      PhysicalOffsetFrame ulna_l_offset: socket_parent=/bodyset/ulna_l
          translation=(-0.007216689 -0.01395384 -0.0279817) orientation=(1.56884 -0.056428 1.53614)
      PhysicalOffsetFrame radius_l_offset: socket_parent=/bodyset/radius_l translation=(0 0 0)
          orientation=(1.56884 -0.056428 1.53614)
    UniversalJoint radius_hand_l: socket_parent_frame=radius_l_offset socket_child_frame=hand_l_offset
      Coordinate wrist_flex_l: default_value=0 range=(-1.22173 1.22173) clamped=true locked=true
      Coordinate wrist_dev_l: default_value=0 range=(-0.4363323 0.6108652) clamped=true locked=true
      PhysicalOffsetFrame radius_l_offset: socket_parent=/bodyset/radius_l
          translation=(-0.009437374 -0.2530089 -0.01460073) orientation=(1.5708 0 1.5708)
      PhysicalOffsetFrame hand_l_offset: socket_parent=/bodyset/hand_l translation=(0 0 0)
          orientation=(1.5708 0 1.5708)
    BallJoint rightChainstayToRearWheel: socket_parent_frame=RearWheel_offset socket_child_frame=rightChainstay_offset
      Coordinate rightChainstay_rx: default_value=0 range=(-3.141593 3.141593)
      Coordinate rightChainstay_ry: default_value=0 locked=true
      Coordinate rightChainstay_rz: default_value=0 locked=true
      PhysicalOffsetFrame RearWheel_offset: socket_parent=/bodyset/RearWheel translation=(0 0.0365 0)
          orientation=(0 0 1.570796)
      PhysicalOffsetFrame rightChainstay_offset: socket_parent=/bodyset/rightChainstay translation=(0 0.205 0)
    BallJoint leftChainstayToRearWheel: socket_parent_frame=RearWheel_offset socket_child_frame=leftChainstay_offset
      Coordinate leftChainstay_rx: default_value=0 range=(-3.141593 3.141593)
      Coordinate leftChainstay_ry: default_value=0 locked=true
      Coordinate leftChainstay_rz: default_value=0 locked=true
      PhysicalOffsetFrame RearWheel_offset: socket_parent=/bodyset/RearWheel translation=(0 -0.0365 0)
          orientation=(0 0 1.570796)
      PhysicalOffsetFrame leftChainstay_offset: socket_parent=/bodyset/leftChainstay translation=(0 0.205 0)
    WeldJoint bottomBracketToRightChainstay: socket_parent_frame=rightChainstay_offset
        socket_child_frame=bottomBracket_offset
      PhysicalOffsetFrame rightChainstay_offset: socket_parent=/bodyset/rightChainstay translation=(0 -0.205 0)
          orientation=(0 0 1.570796)
      PhysicalOffsetFrame bottomBracket_offset: socket_parent=/bodyset/bottomBracket translation=(0 -0.0365 0)
    WeldJoint bottomBracketToLeftChainstay: socket_parent_frame=leftChainstay_offset
        socket_child_frame=bottomBracket_offset
      PhysicalOffsetFrame leftChainstay_offset: socket_parent=/bodyset/leftChainstay translation=(0 -0.205 0)
          orientation=(0 0 1.570796)
      PhysicalOffsetFrame bottomBracket_offset: socket_parent=/bodyset/bottomBracket translation=(0 0.0365 0)
    WeldJoint seatTubeToBottomBracket: socket_parent_frame=bottomBracket_offset socket_child_frame=seatTube_offset
      PhysicalOffsetFrame bottomBracket_offset: socket_parent=/bodyset/bottomBracket translation=(0 0 0)
          orientation=(1.570796 0 0)
      PhysicalOffsetFrame seatTube_offset: socket_parent=/bodyset/seatTube translation=(0 0.2405 0)
          orientation=(0 0 -0.2792527)
    WeldJoint downTubeToBottomBracket: socket_parent_frame=bottomBracket_offset socket_child_frame=downTube_offset
      PhysicalOffsetFrame bottomBracket_offset: socket_parent=/bodyset/bottomBracket translation=(0 0 0)
          orientation=(1.570796 0 0)
      PhysicalOffsetFrame downTube_offset: socket_parent=/bodyset/downTube translation=(0 0.29 0)
          orientation=(0 0 0.85)
    WeldJoint topTubeToSeatTube: socket_parent_frame=seatTube_offset socket_child_frame=topTube_offset
      PhysicalOffsetFrame seatTube_offset: socket_parent=/bodyset/seatTube translation=(0 -0.2405 0)
          orientation=(0 0 -1.850049)
      PhysicalOffsetFrame topTube_offset: socket_parent=/bodyset/topTube translation=(0 0.27 0)
    WeldJoint headTubeToTopTube: socket_parent_frame=topTube_offset socket_child_frame=headTube_offset
      PhysicalOffsetFrame topTube_offset: socket_parent=/bodyset/topTube translation=(0 -0.27 0)
          orientation=(0 0 -1.27409)
      PhysicalOffsetFrame headTube_offset: socket_parent=/bodyset/headTube translation=(0 0.0715 0)
    WeldJoint leftSeatStayToChainStay: socket_parent_frame=leftChainstay_offset socket_child_frame=leftSeatstay_offset
      PhysicalOffsetFrame leftChainstay_offset: socket_parent=/bodyset/leftChainstay translation=(0 0.205 0)
          orientation=(1.570796 0 0)
      PhysicalOffsetFrame leftSeatstay_offset: socket_parent=/bodyset/leftSeatstay translation=(0 0.225 0)
          orientation=(0.7853982 0 0)
    WeldJoint rightSeatStayToChainStay: socket_parent_frame=rightChainstay_offset
        socket_child_frame=rightSeatstay_offset
      PhysicalOffsetFrame rightChainstay_offset: socket_parent=/bodyset/rightChainstay translation=(0 0.205 0)
          orientation=(1.570796 0 0)
      PhysicalOffsetFrame rightSeatstay_offset: socket_parent=/bodyset/rightSeatstay translation=(0 0.225 0)
          orientation=(0.7853982 0 0)
    BallJoint steeringTubeToHeadTube: socket_parent_frame=headTube_offset socket_child_frame=steeringTube_offset
      Coordinate steeringTube_rx: default_value=0 locked=true
      Coordinate steeringTube_ry: default_value=0 range=(-1.047198 1.047198)
      Coordinate steeringTube_rz: default_value=0 locked=true
      PhysicalOffsetFrame headTube_offset: socket_parent=/bodyset/headTube translation=(0 0 0)
      PhysicalOffsetFrame steeringTube_offset: socket_parent=/bodyset/steeringTube translation=(0 0 0)
    WeldJoint stemToSteeringTube: socket_parent_frame=steeringTube_offset socket_child_frame=stem_offset
      PhysicalOffsetFrame steeringTube_offset: socket_parent=/bodyset/steeringTube translation=(0 0.0915 0)
          orientation=(0 0 1.37881)
      PhysicalOffsetFrame stem_offset: socket_parent=/bodyset/stem translation=(0 0.05 0)
    WeldJoint handlebarToStem: socket_parent_frame=stem_offset socket_child_frame=handlebar_offset
      PhysicalOffsetFrame stem_offset: socket_parent=/bodyset/stem translation=(0 -0.05 0) orientation=(1.570796 0 0)
      PhysicalOffsetFrame handlebar_offset: socket_parent=/bodyset/handlebar translation=(0 0 0)
    WeldJoint leftHoodToHandlebar: socket_parent_frame=handlebar_offset socket_child_frame=leftHood_offset
      PhysicalOffsetFrame handlebar_offset: socket_parent=/bodyset/handlebar translation=(0 -0.21 0)
          orientation=(1.570796 0 0)
      PhysicalOffsetFrame leftHood_offset: socket_parent=/bodyset/leftHood translation=(0 -0.05 0)
          orientation=(0 0 -0.1047198)
    WeldJoint rightHoodToHandlebar: socket_parent_frame=handlebar_offset socket_child_frame=rightHood_offset
      PhysicalOffsetFrame handlebar_offset: socket_parent=/bodyset/handlebar translation=(0 0.21 0)
          orientation=(1.570796 0 0)
      PhysicalOffsetFrame rightHood_offset: socket_parent=/bodyset/rightHood translation=(0 -0.05 0)
          orientation=(0 0 -0.1047198)
    WeldJoint leftDropToLeftHood: socket_parent_frame=leftHood_offset socket_child_frame=leftDrop_offset
      PhysicalOffsetFrame leftHood_offset: socket_parent=/bodyset/leftHood translation=(0 0 0)
          orientation=(0 0 1.570796)
      PhysicalOffsetFrame leftDrop_offset: socket_parent=/bodyset/leftDrop translation=(0 -0.0375 0)
    WeldJoint leftDrop2ToLeftDrop: socket_parent_frame=leftDrop_offset socket_child_frame=leftDrop2_offset
      PhysicalOffsetFrame leftDrop_offset: socket_parent=/bodyset/leftDrop translation=(0 0.0375 0)
          orientation=(0 0 1.047198)
      PhysicalOffsetFrame leftDrop2_offset: socket_parent=/bodyset/leftDrop2 translation=(0 -0.0375 0)
    WeldJoint rightDropToRightHood: socket_parent_frame=rightHood_offset socket_child_frame=rightDrop_offset
      PhysicalOffsetFrame rightHood_offset: socket_parent=/bodyset/rightHood translation=(0 0 0)
          orientation=(0 0 1.570796)
      PhysicalOffsetFrame rightDrop_offset: socket_parent=/bodyset/rightDrop translation=(0 -0.0375 0)
    WeldJoint rightDrop2ToRightDrop: socket_parent_frame=rightDrop_offset socket_child_frame=rightDrop2_offset
      PhysicalOffsetFrame rightDrop_offset: socket_parent=/bodyset/rightDrop translation=(0 0.0375 0)
          orientation=(0 0 1.047198)
      PhysicalOffsetFrame rightDrop2_offset: socket_parent=/bodyset/rightDrop2 translation=(0 -0.0375 0)
    WeldJoint leftForkToSteeringTube: socket_parent_frame=steeringTube_offset socket_child_frame=leftFork_offset
      PhysicalOffsetFrame steeringTube_offset: socket_parent=/bodyset/steeringTube translation=(0 -0.0915 0.0365)
      PhysicalOffsetFrame leftFork_offset: socket_parent=/bodyset/leftFork translation=(0 0.1815 0)
    WeldJoint rightForkToSteeringTube: socket_parent_frame=steeringTube_offset socket_child_frame=rightFork_offset
      PhysicalOffsetFrame steeringTube_offset: socket_parent=/bodyset/steeringTube translation=(0 -0.0915 -0.0365)
      PhysicalOffsetFrame rightFork_offset: socket_parent=/bodyset/rightFork translation=(0 0.1815 0)
    BallJoint frontWheelToLeftFork: socket_parent_frame=leftFork_offset socket_child_frame=frontWheel_offset
      Coordinate frontWheel_rx: default_value=0 locked=true
      Coordinate frontWheel_ry: default_value=0 range=(-3.141593 3.141593)
      Coordinate frontWheel_rz: default_value=0 locked=true
      PhysicalOffsetFrame leftFork_offset: socket_parent=/bodyset/leftFork translation=(0 -0.1815 -0.0365)
          orientation=(-1.570796 0 0)
      PhysicalOffsetFrame frontWheel_offset: socket_parent=/bodyset/frontWheel translation=(0 0 0)
    SliderJoint seatpostToSeatTube: socket_parent_frame=seatTube_offset socket_child_frame=seatpost_offset
      Coordinate seatpost_tx: default_value=0 range=(-0.38 0.38) locked=true
      PhysicalOffsetFrame seatTube_offset: socket_parent=/bodyset/seatTube translation=(0 -0.2405 0)
          orientation=(0 0 1.570796)
      PhysicalOffsetFrame seatpost_offset: socket_parent=/bodyset/seatpost translation=(0 0 0)
          orientation=(0 0 1.570796)
    PlanarJoint saddleToSeatpost: socket_parent_frame=seatpost_offset socket_child_frame=saddle_offset
      Coordinate saddle_rz: default_value=0 range=(-3.141593 3.141593) locked=true
      Coordinate saddle_tx: default_value=0 range=(-0.38 0.38) locked=true
      Coordinate saddle_ty: default_value=0 locked=true
      PhysicalOffsetFrame seatpost_offset: socket_parent=/bodyset/seatpost translation=(0 -0.19 0)
          orientation=(-3.141593 1.224647e-16 -2.86234)
      PhysicalOffsetFrame saddle_offset: socket_parent=/bodyset/saddle translation=(0 0 0)
    BallJoint crankSpindleToBottomBracket: socket_parent_frame=bottomBracket_offset
        socket_child_frame=crankSpindle_offset
      Coordinate crankSpindle_rx: default_value=0 locked=true
      Coordinate crankSpindle_ry: default_value=0 range=(-3.141593 3.141593)
      Coordinate crankSpindle_rz: default_value=0 locked=true
      PhysicalOffsetFrame bottomBracket_offset: socket_parent=/bodyset/bottomBracket translation=(0 0 0)
      PhysicalOffsetFrame crankSpindle_offset: socket_parent=/bodyset/crankSpindle translation=(0 0 0)
    WeldJoint leftCrankToSpindle: socket_parent_frame=crankSpindle_offset socket_child_frame=leftCrank_offset
      PhysicalOffsetFrame crankSpindle_offset: socket_parent=/bodyset/crankSpindle translation=(0 0.075 0)
          orientation=(1.570796 0 0)
      PhysicalOffsetFrame leftCrank_offset: socket_parent=/bodyset/leftCrank translation=(-0.0875 0 0)
    PinJoint leftPedalToLeftCrank: socket_parent_frame=leftCrank_offset socket_child_frame=leftPedal_offset
      Coordinate leftPedal_rz: default_value=0 range=(-3.141593 3.141593)
      PhysicalOffsetFrame leftCrank_offset: socket_parent=/bodyset/leftCrank translation=(0.0875 0 -0.005)
      PhysicalOffsetFrame leftPedal_offset: socket_parent=/bodyset/leftPedal translation=(0 0 0.02)
    WeldJoint rightCrankToSpindle: socket_parent_frame=crankSpindle_offset socket_child_frame=rightCrank_offset
      PhysicalOffsetFrame crankSpindle_offset: socket_parent=/bodyset/crankSpindle translation=(0 -0.075 0)
          orientation=(1.570796 0 0)
      PhysicalOffsetFrame rightCrank_offset: socket_parent=/bodyset/rightCrank translation=(0.0875 0 0)
    PinJoint rightPedalToRightCrank: socket_parent_frame=rightCrank_offset socket_child_frame=rightPedal_offset
      Coordinate rightPedal_rz: default_value=0 range=(-3.141593 3.141593)
      PhysicalOffsetFrame rightCrank_offset: socket_parent=/bodyset/rightCrank translation=(-0.0875 0 0.005)
      PhysicalOffsetFrame rightPedal_offset: socket_parent=/bodyset/rightPedal translation=(0 0 -0.02)
    WeldJoint leftToesToLeftPedal: socket_parent_frame=leftPedal_offset socket_child_frame=toes_l_offset
      PhysicalOffsetFrame leftPedal_offset: socket_parent=/bodyset/leftPedal translation=(0 0 0)
          orientation=(0 0 3.141593)
      PhysicalOffsetFrame toes_l_offset: socket_parent=/bodyset/toes_l translation=(0 0 0)
    WeldJoint rightToesToRightPedal: socket_parent_frame=rightPedal_offset socket_child_frame=toes_r_offset
      PhysicalOffsetFrame rightPedal_offset: socket_parent=/bodyset/rightPedal translation=(0 0 0)
          orientation=(0 0 3.141593)
      PhysicalOffsetFrame toes_r_offset: socket_parent=/bodyset/toes_r translation=(0 0 0)
    WeldJoint leftHandToLeftDrop2: socket_parent_frame=leftDrop2_offset socket_child_frame=hand_l_offset
      PhysicalOffsetFrame leftDrop2_offset: socket_parent=/bodyset/leftDrop2 translation=(0 0 0.012)
          orientation=(0 1.570796 0)
      PhysicalOffsetFrame hand_l_offset: socket_parent=/bodyset/hand_l translation=(0 -0.1 0)
          orientation=(1.570796 0 0)
    WeldJoint rightHandToRightDrop2: socket_parent_frame=rightDrop2_offset socket_child_frame=hand_r_offset
      PhysicalOffsetFrame rightDrop2_offset: socket_parent=/bodyset/rightDrop2 translation=(0 0 -0.012)
          orientation=(0 -1.570796 0)
      PhysicalOffsetFrame hand_r_offset: socket_parent=/bodyset/hand_r translation=(0 -0.1 0)
          orientation=(-1.570796 0 0)
  ConstraintSet:
    CoordinateCouplerConstraint patellofemoral_knee_angle_r_con: independent_coordinate_names=knee_angle_r
        dependent_coordinate_name=knee_angle_r_beta scale_factor=1
        coupled_coordinates_function=LinearFunction(coefficients=1 0)
    CoordinateCouplerConstraint patellofemoral_knee_angle_l_con: independent_coordinate_names=knee_angle_l
        dependent_coordinate_name=knee_angle_l_beta scale_factor=1
        coupled_coordinates_function=LinearFunction(coefficients=1 0)
  ForceSet:
    Millard2012EquilibriumMuscle [values shared by the 80 below unless stated]: fiber_damping=0.01
        default_activation=0.01 minimum_activation=0.01
      ActiveForceLengthCurve: min_norm_active_fiber_length=0.25 transition_norm_fiber_length=0.77
          max_norm_active_fiber_length=1.9 shallow_ascending_slope=0.75 minimum_value=0
      ForceVelocityCurve: concentric_slope_at_vmax=0 concentric_slope_near_vmax=0.25 isometric_slope=5
          eccentric_slope_at_vmax=0 eccentric_slope_near_vmax=0.15 max_eccentric_velocity_force_multiplier=1.4
      FiberForceLengthCurve: strain_at_zero_force=0 strain_at_one_norm_force=0.7
      TendonForceLengthCurve
    Millard2012EquilibriumMuscle addbrev_r: max_isometric_force=625.8197 optimal_fiber_length=0.1013148
        tendon_slack_length=0.03483646 pennation_angle_at_optimal=0.1147809 [radians] ignore_tendon_compliance=true
      PathPoint P1: pelvis (-0.01883156 -0.09614642 0.01575165)
      PathPoint P2: femur_r (-0.001913845 -0.1150025 0.02382737)
      PathWrap: wrap_object=AB_at_femshaft_r method=hybrid
    Millard2012EquilibriumMuscle addlong_r: max_isometric_force=916.8 optimal_fiber_length=0.105638
        tendon_slack_length=0.1286786 pennation_angle_at_optimal=0.1377704
      PathPoint P1: pelvis (-0.007473469 -0.09092997 0.01931111)
      PathPoint P2: femur_r (0.01077495 -0.2332894 0.01514808)
      PathWrap: wrap_object=AL_at_femshaft_r method=hybrid
    Millard2012EquilibriumMuscle addmagDist_r: max_isometric_force=597.2951 optimal_fiber_length=0.1711892
        tendon_slack_length=0.08441667 pennation_angle_at_optimal=0.194705 ignore_tendon_compliance=true
      PathPoint P1: pelvis (-0.07299942 -0.1305853 0.04072926)
      PathPoint P2: femur_r (0.01076538 -0.2558319 0.0184686)
      PathWrap: wrap_object=AMdist_at_femshaft_r method=hybrid
    Millard2012EquilibriumMuscle addmagIsch_r: max_isometric_force=597.2951 optimal_fiber_length=0.1511156
        tendon_slack_length=0.209301 pennation_angle_at_optimal=0.1680443
      PathPoint P1: pelvis (-0.08836046 -0.132723 0.04266242)
      PathPoint P2: femur_r (0.004602797 -0.3781146 -0.03132007)
      PathWrap: wrap_object=AMisch_at_condyles_r method=hybrid
    Millard2012EquilibriumMuscle addmagMid_r: max_isometric_force=597.2951 optimal_fiber_length=0.133531
        tendon_slack_length=0.045216 pennation_angle_at_optimal=0.2073076 ignore_tendon_compliance=true
      PathPoint P1: pelvis (-0.0519199 -0.1235072 0.02919169)
      PathPoint P2: femur_r (0.002315752 -0.1582746 0.02796127)
      PathWrap: wrap_object=AMmid_at_femshaft_r method=hybrid
    Millard2012EquilibriumMuscle addmagProx_r: max_isometric_force=597.2951 optimal_fiber_length=0.1042014
        tendon_slack_length=0.03979002 pennation_angle_at_optimal=0.3114833 ignore_tendon_compliance=true
      PathPoint P1: pelvis (-0.0305446 -0.1100058 0.01396169)
      PathPoint P2: femur_r (-0.0146122 -0.07685677 0.03064065)
      PathWrap: wrap_object=AMprox_at_femshaft_r method=hybrid
    Millard2012EquilibriumMuscle bflh140_r: max_isometric_force=1313.184 optimal_fiber_length=0.0955838
        tendon_slack_length=0.3256313 pennation_angle_at_optimal=0.1759182
      PathPoint bflh_r-P1: pelvis (-0.1025384 -0.1218196 0.05993809)
      PathPoint bflh_r-P2: tibia_r (-0.03187391 -0.03892052 0.03356222)
      PathPoint bflh_r-P3: tibia_r (-0.02508354 -0.05343036 0.03224497)
    Millard2012EquilibriumMuscle bfsh140_r: max_isometric_force=557.1148 optimal_fiber_length=0.1086968
        tendon_slack_length=0.1042791 pennation_angle_at_optimal=0.2642232 ignore_tendon_compliance=true
      PathPoint bfsh_r-P1: femur_r (0.004784612 -0.2057376 0.02239198)
      PathPoint bfsh_r-P2: tibia_r (-0.02658633 -0.035037 0.02972177)
      PathWrap: wrap_object=BF140_at_gastroc_r method=hybrid
    Millard2012EquilibriumMuscle edl_r: max_isometric_force=603.4982 optimal_fiber_length=0.07100577
        tendon_slack_length=0.3779549 pennation_angle_at_optimal=0.2182582
      PathPoint P1: tibia_r (-0.01484233 -0.1234403 0.01901674)
      PathPoint P2: tibia_r (0.01521339 -0.4011544 0.01038963)
      PathPoint P3: calcn_r (0.08386286 0.03285161 0.0007798223)
      PathPoint P4: calcn_r (0.1474672 0.005018996 0.01267211)
      PathPoint P5: toes_r (0.0002737634 0.00428896 0.0149141)
      PathPoint P6: toes_r (0.04042573 -0.0003650179 0.02436945)
    Millard2012EquilibriumMuscle ehl_r: max_isometric_force=285.8675 optimal_fiber_length=0.07611233
        tendon_slack_length=0.3325287 pennation_angle_at_optimal=0.1972681
      PathPoint P1: tibia_r (-0.01298704 -0.1653695 0.01753251)
      PathPoint P2: tibia_r (0.006586285 -0.3103612 0.01521339)
      PathPoint P3: tibia_r (0.01855292 -0.3940062 -0.002597408)
      PathPoint P4: calcn_r (0.08851684 0.03549799 -0.02056781)
      PathPoint P5: calcn_r (0.117992 0.02819763 -0.02505179)
      PathPoint P6: calcn_r (0.1582353 0.01268437 -0.02729378)
      PathPoint P7: toes_r (0.02719383 0.003741433 -0.02388206)
      PathPoint P8: toes_r (0.05137627 0.003102652 -0.01813087)
    Millard2012EquilibriumMuscle fdl_r: max_isometric_force=423.177 optimal_fiber_length=0.04501017
        tendon_slack_length=0.3822563 pennation_angle_at_optimal=0.2248391
      PathPoint P1: tibia_r (-0.002133585 -0.1954561 -0.001669762)
      PathPoint P2: tibia_r (-0.01632657 -0.3888851 -0.01150281)
      PathPoint P3: calcn_r (0.03978695 0.02874516 -0.02729378)
      PathPoint P4: calcn_r (0.06460817 0.01606079 -0.02563666)
      PathPoint P5: calcn_r (0.1512999 -0.007391612 0.01130742)
      PathPoint P6: toes_r (-0.001733835 -0.007117849 0.01432923)
      PathPoint P7: toes_r (0.02600752 -0.006479068 0.02095772)
      PathPoint P8: toes_r (0.04024322 -0.005475268 0.02358962)
    Millard2012EquilibriumMuscle fhl_r: max_isometric_force=907.8393 optimal_fiber_length=0.05260689
        tendon_slack_length=0.3537136 pennation_angle_at_optimal=0.2580255
      PathPoint P1: tibia_r (-0.02875702 -0.2307705 0.01855292)
      PathPoint P2: tibia_r (-0.02244903 -0.391659 -0.007050108)
      PathPoint P3: calcn_r (0.03412917 0.02518623 -0.02349215)
      PathPoint P4: calcn_r (0.09472214 0.006205304 -0.02495431)
      PathPoint P5: calcn_r (0.1575052 -0.004836487 -0.02622152)
      PathPoint P6: toes_r (0.01414444 -0.005840286 -0.02583161)
      PathPoint P7: toes_r (0.05128501 -0.009307956 -0.01764348)
    Millard2012EquilibriumMuscle gaslat140_r: max_isometric_force=1575.059 optimal_fiber_length=0.07377259
        tendon_slack_length=0.3998688 pennation_angle_at_optimal=0.2102268
      PathPoint gaslat_r-P1: femur_r (0.001913845 -0.3713217 0.01970303)
      PathPoint gaslat_r-P2: calcn_r (0.004015197 0.02828889 -0.005166323)
      PathWrap: wrap_object=GasLat_at_shank_r method=hybrid
      PathWrap pathwrap_0: wrap_object=GasLat_at_condyles_r method=hybrid
    Millard2012EquilibriumMuscle gasmed_r: max_isometric_force=3115.515 optimal_fiber_length=0.06297675
        tendon_slack_length=0.4130848 pennation_angle_at_optimal=0.1656816
      PathPoint P1: femur_r (0.005741534 -0.3752201 -0.02105229)
      PathPoint P2: calcn_r (0.004015197 0.02828889 -0.005166323)
      PathWrap: wrap_object=GasMed_at_shank_r method=hybrid
      PathWrap pathwrap_0: wrap_object=GasMed_at_condyles_r method=hybrid
    Millard2012EquilibriumMuscle glmax1_r: max_isometric_force=983.7836 optimal_fiber_length=0.1473871
        tendon_slack_length=0.08752987 pennation_angle_at_optimal=0.3540118 ignore_tendon_compliance=true
      PathPoint P1: pelvis (-0.1213699 0.03528778 0.05758557)
      PathPoint P2: pelvis (-0.1239334 -0.02475259 0.07967879)
      PathPoint P3: femur_r (-0.04248735 -0.03177188 0.02889906)
      PathPoint P4: femur_r (-0.02650675 -0.05516222 0.04497535)
      PathWrap: wrap_object=Gmax1_at_pelvis_r method=hybrid
    Millard2012EquilibriumMuscle glmax2_r: max_isometric_force=1406.046 optimal_fiber_length=0.1563568
        tendon_slack_length=0.1085534 pennation_angle_at_optimal=0.3673821 ignore_tendon_compliance=true
      PathPoint P1: pelvis (-0.1298491 0.008898658 0.04725494)
      PathPoint P2: pelvis (-0.1325111 -0.06229061 0.08315643)
      PathPoint P3: femur_r (-0.04306151 -0.0569165 0.02411444)
      PathPoint P4: femur_r (-0.01492799 -0.09901912 0.04009505)
      PathWrap: wrap_object=Gmax2_at_pelvis_r method=hybrid
    Millard2012EquilibriumMuscle glmax3_r: max_isometric_force=947.7541 optimal_fiber_length=0.1651226
        tendon_slack_length=0.1018421 pennation_angle_at_optimal=0.3824161 ignore_tendon_compliance=true
      PathPoint P1: pelvis (-0.1281729 -0.0536988 0.009205508)
      PathPoint P2: pelvis (-0.1255109 -0.129184 0.04449329)
      PathPoint P3: femur_r (-0.02688952 -0.1096422 0.00899507)
      PathPoint P4: femur_r (-0.005741534 -0.1382954 0.03932951)
      PathWrap: wrap_object=Gmax3_at_pelvis_r method=hybrid
    Millard2012EquilibriumMuscle glmed1_r: max_isometric_force=1093.467 optimal_fiber_length=0.0737766
        tendon_slack_length=0.05641063 pennation_angle_at_optimal=0.3165559 ignore_tendon_compliance=true
      PathPoint P1: pelvis (-0.04387459 0.02505944 0.1198762)
      PathPoint P2: femur_r (-0.02086091 -0.01140279 0.05310919)
    Millard2012EquilibriumMuscle glmed2_r: max_isometric_force=765.0917 optimal_fiber_length=0.07364376
        tendon_slack_length=0.06582422 pennation_angle_at_optimal=0.3165559 ignore_tendon_compliance=true
      PathPoint P1: pelvis (-0.08380539 0.03232156 0.06904131)
      PathPoint P2: femur_r (-0.0246886 -0.005652666 0.05042981)
    Millard2012EquilibriumMuscle glmed3_r: max_isometric_force=871.1993 optimal_fiber_length=0.07302057
        tendon_slack_length=0.04524559 pennation_angle_at_optimal=0.3165559 ignore_tendon_compliance=true
      PathPoint P1: pelvis (-0.113581 -0.00746669 0.05380108)
      PathPoint P2: femur_r (-0.0295689 -0.004580609 0.04956858)
    Millard2012EquilibriumMuscle glmin1_r: max_isometric_force=374.0459 optimal_fiber_length=0.06797564
        tendon_slack_length=0.016132 pennation_angle_at_optimal=0.1745329 ignore_tendon_compliance=true
      PathPoint P1: pelvis (-0.04574788 -0.01524023 0.1065793)
      PathPoint P2: femur_r (-0.006889841 -0.01013581 0.05358765)
    Millard2012EquilibriumMuscle glmin2_r: max_isometric_force=394.8197 optimal_fiber_length=0.05591673
        tendon_slack_length=0.02606024 pennation_angle_at_optimal=0 ignore_tendon_compliance=true
      PathPoint P1: pelvis (-0.06073426 -0.01452425 0.09931721)
      PathPoint P2: femur_r (-0.009186455 -0.01013581 0.05358765)
    Millard2012EquilibriumMuscle glmin3_r: max_isometric_force=446.7738 optimal_fiber_length=0.03783797
        tendon_slack_length=0.05065558 pennation_angle_at_optimal=0.01745329
      PathPoint P1: pelvis (-0.07779112 -0.01585393 0.08162218)
      PathPoint P2: femur_r (-0.01291845 -0.00808916 0.05263073)
    Millard2012EquilibriumMuscle grac_r: max_isometric_force=281.3115 optimal_fiber_length=0.2236533
        tendon_slack_length=0.1688826 pennation_angle_at_optimal=0.1720016 ignore_tendon_compliance=true
      PathPoint P1: pelvis (-0.04669439 -0.1322729 0.02512081)
      PathPoint P2: tibia_r (-0.01708724 -0.0507311 -0.02746759)
      PathPoint P3: tibia_r (0.001651209 -0.07427759 -0.01459187)
      PathWrap: wrap_object=GR_at_condyles_r method=hybrid
    Millard2012EquilibriumMuscle iliacus_r: max_isometric_force=1021.141 optimal_fiber_length=0.1068204
        tendon_slack_length=0.09631945 pennation_angle_at_optimal=0.279914 ignore_tendon_compliance=true
      PathPoint P1: pelvis (-0.05964972 0.03160558 0.08622493)
      PathPoint P2: pelvis (-0.01331027 -0.05697187 0.07732627)
      PathPoint P3: femur_r (-0.002200921 -0.05506476 0.01330122)
      PathPoint P4: femur_r (-0.01167445 -0.06208187 0.01875568)
      PathWrap: wrap_object=IL_at_brim_r method=hybrid range=(2 3)
    Millard2012EquilibriumMuscle perbrev_r: max_isometric_force=521.2016 optimal_fiber_length=0.04779546
        tendon_slack_length=0.1553116 pennation_angle_at_optimal=0.2052361
      PathPoint P1: tibia_r (-0.02254179 -0.2701391 0.02328391)
      PathPoint P2: tibia_r (-0.03144719 -0.4153442 0.02309838)
      PathPoint P3: tibia_r (-0.0264379 -0.4271868 0.02365497)
      PathPoint P4: calcn_r (0.04298086 0.02463871 0.02271232)
      PathPoint P5: calcn_r (0.06177928 0.01998473 0.03343488)
    Millard2012EquilibriumMuscle perlong_r: max_isometric_force=1115.371 optimal_fiber_length=0.0526765
        tendon_slack_length=0.3444926 pennation_angle_at_optimal=0.2479525
      PathPoint P1: tibia_r (-0.01855292 -0.1464854 0.02615961)
      PathPoint P2: tibia_r (-0.02940637 -0.416091 0.0219852)
      PathPoint P3: tibia_r (-0.02523197 -0.4282537 0.0222635)
      PathPoint P4: calcn_r (0.03996946 0.02098853 0.02154259)
      PathPoint P5: calcn_r (0.0621443 0.009672974 0.02768369)
      PathPoint P6: calcn_r (0.07774881 0.006296559 0.01150238)
      PathPoint P7: calcn_r (0.1097791 0.00775663 -0.01793591)
    Millard2012EquilibriumMuscle piri_r: max_isometric_force=1029.787 optimal_fiber_length=0.02614491
        tendon_slack_length=0.1155467 pennation_angle_at_optimal=0.1745329
      PathPoint P1: pelvis (-0.1003791 -0.006679108 0.01381849)
      PathPoint P2: pelvis (-0.1005862 -0.0313601 0.06231106)
      PathPoint P3: femur_r (-0.01416245 -0.003508551 0.04181751)
    Millard2012EquilibriumMuscle psoas_r: max_isometric_force=1426.79 optimal_fiber_length=0.1175303
        tendon_slack_length=0.1000798 pennation_angle_at_optimal=0.2155251 ignore_tendon_compliance=true
      PathPoint P1: pelvis (-0.05974831 0.06341573 0.03989054)
      PathPoint P2: pelvis (-0.02021189 -0.06689336 0.06709793)
      PathPoint P3: femur_r (-0.01263138 -0.04551371 0.004401843)
      PathPoint P4: femur_r (-0.02248768 -0.05106891 0.008420917)
      PathWrap: wrap_object=PS_at_brim_r method=hybrid range=(2 3)
    Millard2012EquilibriumMuscle recfem_r: max_isometric_force=2191.741 optimal_fiber_length=0.07506747
        tendon_slack_length=0.4454597 pennation_angle_at_optimal=0.2170149
      PathPoint P1: pelvis (-0.0236627 -0.03968597 0.09543044)
      PathPoint P2: patella_r (0.009569224 0.04775528 0.0006698457)
      PathPoint P3: patella_r (0.01157876 0.04258991 -0.0009569224)
      PathPoint P4: patella_r (0.004784612 0.002407256 2.870767e-5)
      PathPoint P5: tibia_r (0.03024125 -0.06734274 -0.0004359935)
      PathWrap: wrap_object=KnExt_at_fem_r method=hybrid
    Millard2012EquilibriumMuscle sart_r: max_isometric_force=249.4131 optimal_fiber_length=0.3975596
        tendon_slack_length=0.1223259 pennation_angle_at_optimal=0.02613542 ignore_tendon_compliance=true
      PathPoint P1: pelvis (-0.01922594 -0.01595621 0.1080113)
      PathPoint P2: femur_r (-0.002870767 -0.3477364 -0.04028643)
      PathPoint P3: tibia_r (-0.02328391 -0.04278269 -0.03385907)
      PathPoint P4: tibia_r (-0.01474957 -0.06390732 -0.02448985)
      PathPoint P5: tibia_r (0.01261598 -0.08641891 -0.002411879)
    Millard2012EquilibriumMuscle semimem_r: max_isometric_force=2200.987 optimal_fiber_length=0.08396675
        tendon_slack_length=0.3270798 pennation_angle_at_optimal=0.2545615
      PathPoint P1: pelvis (-0.09731285 -0.1166031 0.06280202)
      PathPoint P2: tibia_r (-0.02504644 -0.0437429 -0.01818186)
      PathWrap: wrap_object=SM_at_condyles_r method=hybrid
    Millard2012EquilibriumMuscle semiten_r: max_isometric_force=591.2951 optimal_fiber_length=0.1894515
        tendon_slack_length=0.2426539 pennation_angle_at_optimal=0.241295
      PathPoint P1: pelvis (-0.1023412 -0.1281611 0.05267597)
      PathPoint P2: tibia_r (-0.02894255 -0.05419853 -0.02124309)
      PathPoint P3: tibia_r (0.001762527 -0.08247138 -0.01085346)
      PathWrap: wrap_object=ST_at_condyles_r method=hybrid
    Millard2012EquilibriumMuscle soleus_r: max_isometric_force=6194.843 optimal_fiber_length=0.04746908
        tendon_slack_length=0.3035324 pennation_angle_at_optimal=0.3814289
      PathPoint P1: tibia_r (-0.007050108 -0.09772805 0.009090929)
      PathPoint P2: calcn_r (0.004015197 0.02828889 -0.005166323)
    Millard2012EquilibriumMuscle tfl_r: max_isometric_force=411.2066 optimal_fiber_length=0.09395515
        tendon_slack_length=0.4445533 pennation_angle_at_optimal=0.05235988
      PathPoint P1: pelvis (-0.03066291 0.02188865 0.1269337)
      PathPoint P2: femur_r (0.02813352 -0.09697246 0.05712827)
      PathPoint P3: femur_r (0.01023907 -0.394712 0.03100429)
      PathPoint P4: tibia_r (0.01001857 -0.0437429 0.03209654)
    Millard2012EquilibriumMuscle tibant_r: max_isometric_force=1227.452 optimal_fiber_length=0.07256962
        tendon_slack_length=0.2554929 pennation_angle_at_optimal=0.1951828
      PathPoint P1: tibia_r (0.01428574 -0.1399773 0.01502786)
      PathPoint P2: tibia_r (0.02328391 -0.2033512 0.01187387)
      PathPoint P3: tibia_r (0.02161415 -0.3903788 -0.01224492)
      PathPoint P4: calcn_r (0.1064027 0.0162433 -0.02973072)
    Millard2012EquilibriumMuscle tibpost_r: max_isometric_force=1730.154 optimal_fiber_length=0.04016374
        tendon_slack_length=0.2983375 pennation_angle_at_optimal=0.2264891
      PathPoint P1: tibia_r (-0.003803348 -0.1391238 0.009554752)
      PathPoint P2: tibia_r (-0.01521339 -0.389952 -0.0162338)
      PathPoint P3: calcn_r (0.03805312 0.03047899 -0.02787865)
      PathPoint P4: calcn_r (0.07044845 0.01450946 -0.02739126)
    Millard2012EquilibriumMuscle vasint_r: max_isometric_force=1697.361 optimal_fiber_length=0.1162751
        tendon_slack_length=0.2037298 pennation_angle_at_optimal=0.06309973
      PathPoint P1: femur_r (0.02775075 -0.1875126 0.02966459)
      PathPoint P2: femur_r (0.0320569 -0.2031061 0.02727229)
      PathPoint P3: patella_r (0.00555015 0.04678068 -0.0005741534)
      PathPoint P4: patella_r (0.004784612 0.002407256 -0.0003731997)
      PathPoint P5: tibia_r (0.03021342 -0.06742809 0.0003988877)
      PathWrap: wrap_object=KnExt_at_fem_r method=hybrid
    Millard2012EquilibriumMuscle vaslat140_r: max_isometric_force=5148.767 optimal_fiber_length=0.1160944
        tendon_slack_length=0.2192894 pennation_angle_at_optimal=0.2528673
      PathPoint vaslat_r-P1: femur_r (0.004593227 -0.1806904 0.03339659)
      PathPoint vaslat_r-P2: femur_r (0.02574121 -0.2525182 0.03913813)
      PathPoint vaslat_r-P3: patella_r (0.009856301 0.04122548 0.01349261)
      PathPoint vaslat_r-P4: patella_r (0.004784612 0.002407256 0.007014241)
      PathPoint vaslat_r-P5: tibia_r (0.03018559 -0.06762013 0.00474027)
      PathWrap: wrap_object=KnExtVL_at_fem_r method=hybrid
    Millard2012EquilibriumMuscle vasmed_r: max_isometric_force=2747.823 optimal_fiber_length=0.1093525
        tendon_slack_length=0.2067757 pennation_angle_at_optimal=0.4222225
      PathPoint P1: femur_r (0.01339691 -0.204568 0.01799014)
      PathPoint P2: femur_r (0.03406644 -0.2698661 0.0008612301)
      PathPoint P3: patella_r (0.006028611 0.04336959 -0.01626768)
      PathPoint P4: patella_r (0.004784612 0.002407256 -0.00813384)
      PathPoint P5: tibia_r (0.0295919 -0.06782284 -0.006289438)
      PathWrap: wrap_object=KnExt_at_fem_r method=hybrid
    Millard2012EquilibriumMuscle addbrev_l: max_isometric_force=625.8197 optimal_fiber_length=0.1016645
        tendon_slack_length=0.03495672 pennation_angle_at_optimal=0.1147809 ignore_tendon_compliance=true
      PathPoint P1: pelvis (-0.01883156 -0.09614642 -0.01575165)
      PathPoint P2: femur_l (-0.001983032 -0.1148645 -0.02468874)
      PathWrap: wrap_object=AB_at_femshaft_l method=hybrid
    Millard2012EquilibriumMuscle addlong_l: max_isometric_force=916.8 optimal_fiber_length=0.1055735
        tendon_slack_length=0.1286 pennation_angle_at_optimal=0.1377704
      PathPoint P1: pelvis (-0.007473469 -0.09092997 -0.01931111)
      PathPoint P2: femur_l (0.01116447 -0.2330094 -0.0156957)
      PathWrap: wrap_object=AL_at_femshaft_l method=hybrid
    Millard2012EquilibriumMuscle addmagDist_l: max_isometric_force=597.2951 optimal_fiber_length=0.1711373
        tendon_slack_length=0.08439104 pennation_angle_at_optimal=0.194705 ignore_tendon_compliance=true
      PathPoint P1: pelvis (-0.07299942 -0.1305853 -0.04072926)
      PathPoint P2: femur_l (0.01115455 -0.2555248 -0.01913626)
      PathWrap: wrap_object=AMdist_at_femshaft_l method=hybrid
    Millard2012EquilibriumMuscle addmagIsch_l: max_isometric_force=597.2951 optimal_fiber_length=0.1509142
        tendon_slack_length=0.209022 pennation_angle_at_optimal=0.1680443
      PathPoint P1: pelvis (-0.08836046 -0.132723 -0.04266242)
      PathPoint P2: femur_l (0.004769191 -0.3776608 0.03245231)
      PathWrap: wrap_object=AMisch_at_condyles_l method=hybrid
    Millard2012EquilibriumMuscle addmagMid_l: max_isometric_force=597.2951 optimal_fiber_length=0.1339309
        tendon_slack_length=0.0453514 pennation_angle_at_optimal=0.2073076 ignore_tendon_compliance=true
      PathPoint P1: pelvis (-0.0519199 -0.1235072 -0.02919169)
      PathPoint P2: femur_l (0.002399468 -0.1580847 -0.02897209)
      PathWrap: wrap_object=AMmid_at_femshaft_l method=hybrid
    Millard2012EquilibriumMuscle addmagProx_l: max_isometric_force=597.2951 optimal_fiber_length=0.1052262
        tendon_slack_length=0.04018134 pennation_angle_at_optimal=0.3114833 ignore_tendon_compliance=true
      PathPoint P1: pelvis (-0.0305446 -0.1100058 -0.01396169)
      PathPoint P2: femur_l (-0.01514045 -0.07676452 -0.03174834)
      PathWrap: wrap_object=AMprox_at_femshaft_l method=hybrid
    Millard2012EquilibriumMuscle bflh140_l: max_isometric_force=1313.184 optimal_fiber_length=0.09550158
        tendon_slack_length=0.3253512 pennation_angle_at_optimal=0.1759182
      PathPoint bflh_l-P1: pelvis (-0.1025384 -0.1218196 -0.05993809)
      PathPoint bflh_l-P2: tibia_l (-0.03144135 -0.03910045 -0.03310676)
      PathPoint bflh_l-P3: tibia_l (-0.02474314 -0.05367737 -0.03180738)
    Millard2012EquilibriumMuscle bfsh140_l: max_isometric_force=557.1148 optimal_fiber_length=0.1086417
        tendon_slack_length=0.1042264 pennation_angle_at_optimal=0.2642232 ignore_tendon_compliance=true
      PathPoint bfsh_l-P1: femur_l (0.004957579 -0.2054906 -0.02320147)
      PathPoint bfsh_l-P2: tibia_l (-0.02622553 -0.03519898 -0.02931842)
      PathWrap: wrap_object=BF140_at_gastroc_l method=hybrid
    Millard2012EquilibriumMuscle edl_l: max_isometric_force=603.4982 optimal_fiber_length=0.07167078
        tendon_slack_length=0.3814946 pennation_angle_at_optimal=0.2182582
      PathPoint P1: tibia_l (-0.01464091 -0.124011 -0.01875867)
      PathPoint P2: tibia_l (0.01500693 -0.403009 -0.01024864)
      PathPoint P3: calcn_l (0.08544185 0.03347015 -0.0007717425)
      PathPoint P4: calcn_l (0.1502438 0.005113495 -0.01254082)
      PathPoint P5: toes_l (0.0002789179 0.004369714 -0.01475957)
      PathPoint P6: toes_l (0.04118688 -0.0003718905 -0.02411695)
    Millard2012EquilibriumMuscle ehl_l: max_isometric_force=285.8675 optimal_fiber_length=0.07685596
        tendon_slack_length=0.3357776 pennation_angle_at_optimal=0.1972681
      PathPoint P1: tibia_l (-0.0128108 -0.166134 -0.01729457)
      PathPoint P2: tibia_l (0.006496904 -0.3117961 -0.01500693)
      PathPoint P3: tibia_l (0.01830114 -0.3958278 0.002562159)
      PathPoint P4: calcn_l (0.09018345 0.03616635 0.02035471)
      PathPoint P5: calcn_l (0.1202136 0.02872854 0.02479223)
      PathPoint P6: calcn_l (0.1612145 0.0129232 0.02701099)
      PathPoint P7: toes_l (0.02770584 0.003811878 0.02363461)
      PathPoint P8: toes_l (0.05234359 0.00316107 0.01794301)
    Millard2012EquilibriumMuscle fdl_l: max_isometric_force=423.177 optimal_fiber_length=0.04539133
        tendon_slack_length=0.3854934 pennation_angle_at_optimal=0.2248391
      PathPoint P1: tibia_l (-0.002104631 -0.1963597 0.001647102)
      PathPoint P2: tibia_l (-0.016105 -0.390683 0.0113467)
      PathPoint P3: calcn_l (0.04053607 0.02928638 0.02701099)
      PathPoint P4: calcn_l (0.06582462 0.01636318 0.02537103)
      PathPoint P5: calcn_l (0.1541486 -0.007530783 -0.01119027)
      PathPoint P6: toes_l (-0.00176648 -0.007251865 -0.01418077)
      PathPoint P7: toes_l (0.0264972 -0.006601057 -0.02074058)
      PathPoint P8: toes_l (0.04100093 -0.005578358 -0.02334521)
    Millard2012EquilibriumMuscle fhl_l: max_isometric_force=907.8393 optimal_fiber_length=0.05313474
        tendon_slack_length=0.3572627 pennation_angle_at_optimal=0.2580255
      PathPoint P1: tibia_l (-0.02836676 -0.2318374 -0.01830114)
      PathPoint P2: tibia_l (-0.02214438 -0.3934697 0.006954432)
      PathPoint P3: calcn_l (0.03477176 0.02566045 0.02324874)
      PathPoint P4: calcn_l (0.09650559 0.006322139 0.02469576)
      PathPoint P5: calcn_l (0.1604708 -0.00492755 0.02594984)
      PathPoint P6: toes_l (0.01441076 -0.005950248 0.02556397)
      PathPoint P7: toes_l (0.05225062 -0.009483209 0.01746067)
    Millard2012EquilibriumMuscle gaslat140_l: max_isometric_force=1575.059 optimal_fiber_length=0.07398949
        tendon_slack_length=0.4010445 pennation_angle_at_optimal=0.2102268
      PathPoint gaslat_l-P1: femur_l (0.001983032 -0.370876 -0.02041531)
      PathPoint gaslat_l-P2: calcn_l (0.004090796 0.02882152 0.005112794)
      PathWrap: wrap_object=GasLat_at_shank_l method=hybrid
      PathWrap pathwrap_0: wrap_object=GasLat_at_condyles_l method=hybrid
    Millard2012EquilibriumMuscle gasmed_l: max_isometric_force=3115.515 optimal_fiber_length=0.06383444
        tendon_slack_length=0.4187106 pennation_angle_at_optimal=0.1656816
      PathPoint P1: femur_l (0.005949095 -0.3747697 0.02181335)
      PathPoint P2: calcn_l (0.004090796 0.02882152 0.005112794)
      PathWrap: wrap_object=GasMed_at_shank_l method=hybrid
      PathWrap pathwrap_0: wrap_object=GasMed_at_condyles_l method=hybrid
    Millard2012EquilibriumMuscle glmax1_l: max_isometric_force=983.7836 optimal_fiber_length=0.1477173
        tendon_slack_length=0.08772598 pennation_angle_at_optimal=0.3540118 ignore_tendon_compliance=true
      PathPoint P1: pelvis (-0.1213699 0.03528778 -0.05758557)
      PathPoint P2: pelvis (-0.1239334 -0.02475259 -0.07967879)
      PathPoint P3: femur_l (-0.0440233 -0.03173375 -0.02994378)
      PathPoint P4: femur_l (-0.02746499 -0.05509602 -0.04660124)
      PathWrap: wrap_object=Gmax1_at_pelvis_l method=hybrid
    Millard2012EquilibriumMuscle glmax2_l: max_isometric_force=1406.046 optimal_fiber_length=0.1565145
        tendon_slack_length=0.108663 pennation_angle_at_optimal=0.3673821 ignore_tendon_compliance=true
      PathPoint P1: pelvis (-0.1298491 0.008898658 -0.04725494)
      PathPoint P2: pelvis (-0.1325111 -0.06229061 -0.08315643)
      PathPoint P3: femur_l (-0.04461821 -0.05684819 -0.0249862)
      PathPoint P4: femur_l (-0.01546765 -0.09890027 -0.04154451)
      PathWrap: wrap_object=Gmax2_at_pelvis_l method=hybrid
    Millard2012EquilibriumMuscle glmax3_l: max_isometric_force=947.7541 optimal_fiber_length=0.1656061
        tendon_slack_length=0.1021403 pennation_angle_at_optimal=0.3824161 ignore_tendon_compliance=true
      PathPoint P1: pelvis (-0.1281729 -0.0536988 -0.009205508)
      PathPoint P2: pelvis (-0.1255109 -0.129184 -0.04449329)
      PathPoint P3: femur_l (-0.02786159 -0.1095106 -0.009320249)
      PathPoint P4: femur_l (-0.005949095 -0.1381294 -0.0407513)
      PathWrap: wrap_object=Gmax3_at_pelvis_l method=hybrid
    Millard2012EquilibriumMuscle glmed1_l: max_isometric_force=1093.467 optimal_fiber_length=0.07401767
        tendon_slack_length=0.05659496 pennation_angle_at_optimal=0.3165559 ignore_tendon_compliance=true
      PathPoint P1: pelvis (-0.04387459 0.02505944 -0.1198762)
      PathPoint P2: femur_l (-0.02161504 -0.01138911 -0.05502913)
    Millard2012EquilibriumMuscle glmed2_l: max_isometric_force=765.0917 optimal_fiber_length=0.07409372
        tendon_slack_length=0.0662264 pennation_angle_at_optimal=0.3165559 ignore_tendon_compliance=true
      PathPoint P1: pelvis (-0.08380539 0.03232156 -0.06904131)
      PathPoint P2: femur_l (-0.02558111 -0.005645881 -0.05225288)
    Millard2012EquilibriumMuscle glmed3_l: max_isometric_force=871.1993 optimal_fiber_length=0.07363804
        tendon_slack_length=0.04562819 pennation_angle_at_optimal=0.3165559 ignore_tendon_compliance=true
      PathPoint P1: pelvis (-0.113581 -0.00746669 -0.05380108)
      PathPoint P2: femur_l (-0.03063784 -0.004575111 -0.05136052)
    Millard2012EquilibriumMuscle glmin1_l: max_isometric_force=374.0459 optimal_fiber_length=0.06854503
        tendon_slack_length=0.01626713 pennation_angle_at_optimal=0.1745329 ignore_tendon_compliance=true
      PathPoint P1: pelvis (-0.04574788 -0.01524023 -0.1065793)
      PathPoint P2: femur_l (-0.007138914 -0.01012365 -0.05552489)
    Millard2012EquilibriumMuscle glmin2_l: max_isometric_force=394.8197 optimal_fiber_length=0.05645685
        tendon_slack_length=0.02631197 pennation_angle_at_optimal=0 ignore_tendon_compliance=true
      PathPoint P1: pelvis (-0.06073426 -0.01452425 -0.09931721)
      PathPoint P2: femur_l (-0.009518552 -0.01012365 -0.05552489)
    Millard2012EquilibriumMuscle glmin3_l: max_isometric_force=446.7738 optimal_fiber_length=0.03827896
        tendon_slack_length=0.05124596 pennation_angle_at_optimal=0.01745329
      PathPoint P1: pelvis (-0.07779112 -0.01585393 -0.08162218)
      PathPoint P2: femur_l (-0.01338546 -0.008079451 -0.05453337)
    Millard2012EquilibriumMuscle grac_l: max_isometric_force=281.3115 optimal_fiber_length=0.2235024
        tendon_slack_length=0.1687686 pennation_angle_at_optimal=0.1720016 ignore_tendon_compliance=true
      PathPoint P1: pelvis (-0.04669439 -0.1322729 -0.02512081)
      PathPoint P2: tibia_l (-0.01685535 -0.05096564 0.02709483)
      PathPoint P3: tibia_l (0.001628801 -0.07462098 0.01439384)
      PathWrap: wrap_object=GR_at_condyles_l method=hybrid
    Millard2012EquilibriumMuscle iliacus_l: max_isometric_force=1021.141 optimal_fiber_length=0.1070121
        tendon_slack_length=0.09649231 pennation_angle_at_optimal=0.279914 ignore_tendon_compliance=true
      PathPoint P1: pelvis (-0.05964972 0.03160558 -0.08622493)
      PathPoint P2: pelvis (-0.01331027 -0.05697187 -0.07732627)
      PathPoint P3: femur_l (-0.002280486 -0.05499867 -0.01378207)
      PathPoint P4: femur_l (-0.01209649 -0.06200735 -0.01943371)
      PathWrap: wrap_object=IL_at_brim_l method=hybrid range=(2 3)
    Millard2012EquilibriumMuscle perbrev_l: max_isometric_force=521.2016 optimal_fiber_length=0.04813635
        tendon_slack_length=0.1564193 pennation_angle_at_optimal=0.2052361
      PathPoint P1: tibia_l (-0.02223588 -0.271388 -0.02296793)
      PathPoint P2: tibia_l (-0.03102043 -0.4172644 -0.02278492)
      PathPoint P3: tibia_l (-0.02607912 -0.4291618 -0.02333395)
      PathPoint P4: calcn_l (0.04379011 0.02510261 -0.022477)
      PathPoint P5: calcn_l (0.06294247 0.02036101 -0.03308846)
    Millard2012EquilibriumMuscle perlong_l: max_isometric_force=1115.371 optimal_fiber_length=0.05298984
        tendon_slack_length=0.3465418 pennation_angle_at_optimal=0.2479525
      PathPoint P1: tibia_l (-0.01830114 -0.1471626 -0.0258046)
      PathPoint P2: tibia_l (-0.0290073 -0.4180147 -0.02168685)
      PathPoint P3: tibia_l (-0.02488955 -0.4302336 -0.02196136)
      PathPoint P4: calcn_l (0.04072201 0.02138371 -0.02131939)
      PathPoint P5: calcn_l (0.06331436 0.009855099 -0.02739686)
      PathPoint P6: calcn_l (0.07921268 0.006415112 -0.0113832)
      PathPoint P7: calcn_l (0.1118461 0.007902674 0.01775008)
    Millard2012EquilibriumMuscle piri_l: max_isometric_force=1029.787 optimal_fiber_length=0.02630837
        tendon_slack_length=0.1162691 pennation_angle_at_optimal=0.1745329
      PathPoint P1: pelvis (-0.1003791 -0.006679108 -0.01381849)
      PathPoint P2: pelvis (-0.1005862 -0.0313601 -0.06231106)
      PathPoint P3: femur_l (-0.01467443 -0.00350434 -0.04332924)
    Millard2012EquilibriumMuscle psoas_l: max_isometric_force=1426.79 optimal_fiber_length=0.1178657
        tendon_slack_length=0.1003654 pennation_angle_at_optimal=0.2155251 ignore_tendon_compliance=true
      PathPoint P1: pelvis (-0.05974831 0.06341573 -0.03989054)
      PathPoint P2: pelvis (-0.02021189 -0.06689336 -0.06709793)
      PathPoint P3: femur_l (-0.01308801 -0.04545908 -0.004560973)
      PathPoint P4: femur_l (-0.02330062 -0.05100762 -0.008725339)
      PathWrap: wrap_object=PS_at_brim_l method=hybrid range=(2 3)
    Millard2012EquilibriumMuscle recfem_l: max_isometric_force=2191.741 optimal_fiber_length=0.0751548
        tendon_slack_length=0.4459779 pennation_angle_at_optimal=0.2170149
      PathPoint P1: pelvis (-0.0236627 -0.03968597 -0.09543044)
      PathPoint P2: patella_l (0.009915158 0.04769796 -0.0006940611)
      PathPoint P3: patella_l (0.01199734 0.0425388 0.0009915158)
      PathPoint P4: patella_l (0.004957579 0.002404367 -2.974547e-5)
      PathPoint P5: tibia_l (0.02983085 -0.06765407 0.0004300767)
      PathWrap: wrap_object=KnExt_at_fem_l method=hybrid
    Millard2012EquilibriumMuscle sart_l: max_isometric_force=249.4131 optimal_fiber_length=0.3973677
        tendon_slack_length=0.1222668 pennation_angle_at_optimal=0.02613542 ignore_tendon_compliance=true
      PathPoint P1: pelvis (-0.01922594 -0.01595621 -0.1080113)
      PathPoint P2: femur_l (-0.002974547 -0.3473191 0.04174282)
      PathPoint P3: tibia_l (-0.02296793 -0.04298049 0.03339957)
      PathPoint P4: tibia_l (-0.0145494 -0.06420277 0.0241575)
      PathPoint P5: tibia_l (0.01244477 -0.08681844 0.002379148)
    Millard2012EquilibriumMuscle semimem_l: max_isometric_force=2200.987 optimal_fiber_length=0.08390622
        tendon_slack_length=0.326844 pennation_angle_at_optimal=0.2545615
      PathPoint P1: pelvis (-0.09731285 -0.1166031 -0.06280202)
      PathPoint P2: tibia_l (-0.02470653 -0.04394514 0.01793511)
      PathWrap: wrap_object=SM_at_condyles_l method=hybrid
    Millard2012EquilibriumMuscle semiten_l: max_isometric_force=591.2951 optimal_fiber_length=0.1892857
        tendon_slack_length=0.2424415 pennation_angle_at_optimal=0.241295
      PathPoint P1: pelvis (-0.1023412 -0.1281611 -0.05267597)
      PathPoint P2: tibia_l (-0.02854977 -0.05444909 0.0209548)
      PathPoint P3: tibia_l (0.001738608 -0.08285266 0.01070617)
      PathWrap: wrap_object=ST_at_condyles_l method=hybrid
    Millard2012EquilibriumMuscle soleus_l: max_isometric_force=6194.843 optimal_fiber_length=0.04761841
        tendon_slack_length=0.3044873 pennation_angle_at_optimal=0.3814289
      PathPoint P1: tibia_l (-0.006954432 -0.09817986 -0.008967557)
      PathPoint P2: calcn_l (0.004090796 0.02882152 0.005112794)
    Millard2012EquilibriumMuscle tfl_l: max_isometric_force=411.2066 optimal_fiber_length=0.09394011
        tendon_slack_length=0.4444821 pennation_angle_at_optimal=0.05235988
      PathPoint P1: pelvis (-0.03066291 0.02188865 -0.1269337)
      PathPoint P2: femur_l (0.02915057 -0.09685607 -0.05919349)
      PathPoint P3: femur_l (0.01060922 -0.3942383 -0.03212511)
      PathPoint P4: tibia_l (0.009882614 -0.04394514 -0.03166097)
    Millard2012EquilibriumMuscle tibant_l: max_isometric_force=1227.452 optimal_fiber_length=0.07311995
        tendon_slack_length=0.2574304 pennation_angle_at_optimal=0.1951828
      PathPoint P1: tibia_l (0.01409188 -0.1406244 -0.01482392)
      PathPoint P2: tibia_l (0.02296793 -0.2042913 -0.01171273)
      PathPoint P3: tibia_l (0.02132082 -0.3921835 0.01207875)
      PathPoint P4: calcn_l (0.1084061 0.01654913 0.02942268)
    Millard2012EquilibriumMuscle tibpost_l: max_isometric_force=1730.154 optimal_fiber_length=0.04035064
        tendon_slack_length=0.2997258 pennation_angle_at_optimal=0.2264891
      PathPoint P1: tibia_l (-0.003751733 -0.139767 -0.009425085)
      PathPoint P2: tibia_l (-0.01500693 -0.3917548 0.01601349)
      PathPoint P3: calcn_l (0.03876959 0.03105286 0.02758979)
      PathPoint P4: calcn_l (0.07177487 0.01478265 0.02710745)
    Millard2012EquilibriumMuscle vasint_l: max_isometric_force=1697.361 optimal_fiber_length=0.1166572
        tendon_slack_length=0.2043994 pennation_angle_at_optimal=0.06309973
      PathPoint P1: femur_l (0.02875396 -0.1872875 -0.03073699)
      PathPoint P2: femur_l (0.03321578 -0.2028624 -0.0282582)
      PathPoint P3: patella_l (0.005750792 0.04672454 0.0005949095)
      PathPoint P4: patella_l (0.004957579 0.002404367 0.0003866912)
      PathPoint P5: tibia_l (0.0298034 -0.06773982 -0.0003934744)
      PathWrap: wrap_object=KnExt_at_fem_l method=hybrid
    Millard2012EquilibriumMuscle vaslat140_l: max_isometric_force=5148.767 optimal_fiber_length=0.1166333
        tendon_slack_length=0.2203074 pennation_angle_at_optimal=0.2528673
      PathPoint vaslat_l-P1: femur_l (0.004759276 -0.1804735 -0.0346039)
      PathPoint vaslat_l-P2: femur_l (0.02667178 -0.2522152 -0.040553)
      PathPoint vaslat_l-P3: patella_l (0.01021261 0.041176 -0.01398037)
      PathPoint vaslat_l-P4: patella_l (0.004957579 0.002404367 -0.007267811)
      PathPoint vaslat_l-P5: tibia_l (0.02977595 -0.06793275 -0.00467594)
      PathWrap: wrap_object=KnExtVL_at_fem_l method=hybrid
    Millard2012EquilibriumMuscle vasmed_l: max_isometric_force=2747.823 optimal_fiber_length=0.1098845
        tendon_slack_length=0.2077816 pennation_angle_at_optimal=0.4222225
      PathPoint P1: femur_l (0.01388122 -0.2043225 -0.0186405)
      PathPoint P2: femur_l (0.03529796 -0.2695422 -0.0008923642)
      PathPoint P3: patella_l (0.00624655 0.04331754 0.01685577)
      PathPoint P4: patella_l (0.004957579 0.002404367 0.008427884)
      PathPoint P5: tibia_l (0.02919031 -0.0681364 0.006204085)
      PathWrap: wrap_object=KnExt_at_fem_l method=hybrid
    CoordinateActuator lumbar_ext: coordinate=lumbar_extension optimal_force=10
    CoordinateActuator lumbar_bend: coordinate=lumbar_bending optimal_force=10
    CoordinateActuator lumbar_rot: coordinate=lumbar_rotation optimal_force=10
    CoordinateActuator shoulder_flex_r: coordinate=arm_flex_r optimal_force=10
    CoordinateActuator shoulder_add_r: coordinate=arm_add_r optimal_force=10
    CoordinateActuator shoulder_rot_r: coordinate=arm_rot_r optimal_force=10
    CoordinateActuator elbow_flex_r: coordinate=elbow_flex_r optimal_force=10
    CoordinateActuator pro_sup_r: coordinate=pro_sup_r optimal_force=10
    CoordinateActuator wrist_flex_r: coordinate=wrist_flex_r optimal_force=10
    CoordinateActuator wrist_dev_r: coordinate=wrist_dev_r optimal_force=10
    CoordinateActuator shoulder_flex_l: coordinate=arm_flex_l optimal_force=10
    CoordinateActuator shoulder_add_l: coordinate=arm_add_l optimal_force=10
    CoordinateActuator shoulder_rot_l: coordinate=arm_rot_l optimal_force=10
    CoordinateActuator elbow_flex_l: coordinate=elbow_flex_l optimal_force=10
    CoordinateActuator pro_sup_l: coordinate=pro_sup_l optimal_force=10
    CoordinateActuator wrist_flex_l: coordinate=wrist_flex_l optimal_force=10
    CoordinateActuator wrist_dev_l: coordinate=wrist_dev_l optimal_force=10
    Thelen2003Muscle BRA: min_control=0.01 max_control=1 optimal_force=1 max_isometric_force=987.26
        optimal_fiber_length=0.08061865 tendon_slack_length=0.05026921 pennation_angle_at_optimal=0 [radians]
        max_contraction_velocity=10 FmaxTendonStrain=0.033 FmaxMuscleStrain=0.6 KshapeActive=0.5 KshapePassive=4 Af=0.3
        Flen=1.8 activation_time_constant=0.01 [seconds] deactivation_time_constant=0.04 [seconds]
      PathPoint P1: humerus_r (0.005989507 -0.1531728 -0.003170916)
      PathPoint P2: radius_r (-0.003548732 -0.02650459 0.0009980807)
      PathWrap: wrap_object=TRI method=hybrid
    ObjectGroup right_leg: members=(addbrev_r addlong_r addmagDist_r addmagIsch_r addmagMid_r addmagProx_r edl_r ehl_r fdl_r fhl_r gasmed_r glmax1_r glmax2_r glmax3_r glmed1_r glmed2_r glmed3_r glmin1_r glmin2_r glmin3_r grac_r iliacus_r perbrev_r perlong_r piri_r psoas_r recfem_r sart_r semimem_r semiten_r soleus_r tfl_r tibant_r tibpost_r vasint_r vasmed_r)
    ObjectGroup left_leg: members=(addbrev_l addlong_l addmagDist_l addmagIsch_l addmagMid_l addmagProx_l edl_l ehl_l fdl_l fhl_l gasmed_l glmax1_l glmax2_l glmax3_l glmed1_l glmed2_l glmed3_l glmin1_l glmin2_l glmin3_l grac_l iliacus_l perbrev_l perlong_l piri_l psoas_l recfem_l sart_l semimem_l semiten_l soleus_l tfl_l tibant_l tibpost_l vasint_l vasmed_l)
    ObjectGroup hip_add_r: members=(addbrev_r addlong_r addmagDist_r addmagIsch_r addmagMid_r addmagProx_r grac_r semimem_r semiten_r)
    ObjectGroup hip_abd_r: members=(glmax1_r glmed1_r glmed2_r glmed3_r glmin1_r glmin2_r glmin3_r piri_r sart_r tfl_r)
    ObjectGroup hip_flex_r: members=(addbrev_r addlong_r glmin1_r grac_r iliacus_r psoas_r recfem_r sart_r tfl_r)
    ObjectGroup hip_ext_r: members=(addlong_r addmagDist_r addmagIsch_r addmagMid_r addmagProx_r glmax1_r glmax2_r glmax3_r glmed1_r glmed2_r glmed3_r glmin3_r semimem_r semiten_r)
    ObjectGroup hip_inrot_r: members=(glmed1_r glmed2_r glmed3_r glmin1_r iliacus_r psoas_r tfl_r)
    ObjectGroup hip_exrot_r: members=(glmin3_r piri_r)
    ObjectGroup knee_flex_r: members=(gasmed_r grac_r sart_r semimem_r semiten_r)
    ObjectGroup knee_ext_r: members=(recfem_r vasint_r vasmed_r)
    ObjectGroup ankle_df_r: members=(edl_r ehl_r tibant_r)
    ObjectGroup ankle_pf_r: members=(fdl_r fhl_r gasmed_r perbrev_r perlong_r soleus_r tibpost_r)
    ObjectGroup everter_r: members=(edl_r perbrev_r perlong_r)
    ObjectGroup inverter_r: members=(ehl_r fdl_r fhl_r tibant_r tibpost_r)
    ObjectGroup hip_add_l: members=(addbrev_l addlong_l addmagDist_l addmagIsch_l addmagMid_l addmagProx_l grac_l semimem_l semiten_l)
    ObjectGroup hip_abd_l: members=(glmax1_l glmed1_l glmed2_l glmed3_l glmin1_l glmin2_l glmin3_l sart_l tfl_l)
    ObjectGroup hip_flex_l: members=(addbrev_l addlong_l glmin1_l grac_l iliacus_l psoas_l recfem_l sart_l tfl_l)
    ObjectGroup hip_ext_l: members=(addlong_l addmagDist_l addmagIsch_l addmagMid_l addmagProx_l glmax1_l glmax2_l glmax3_l glmed1_l glmed2_l glmed3_l glmin3_l semimem_l semiten_l)
    ObjectGroup hip_exrot_l: members=glmin3_l
    ObjectGroup hip_inrot_l: members=(glmed1_l glmed2_l glmed3_l glmin1_l iliacus_l psoas_l tfl_l)
    ObjectGroup knee_flex_l: members=(gasmed_l grac_l sart_l semimem_l semiten_l)
    ObjectGroup knee_ext_l: members=(recfem_l vasint_l vasmed_l)
    ObjectGroup ankle_df_l: members=(edl_l ehl_l tibant_l)
    ObjectGroup ankle_pf_l: members=(fdl_l fhl_l gasmed_l perbrev_l perlong_l soleus_l tibpost_l)
    ObjectGroup everter_l: members=(edl_l perbrev_l perlong_l)
    ObjectGroup inverter_l: members=(ehl_l fdl_l fhl_l tibant_l tibpost_l)
  MarkerSet:
    Marker racr: torso (-0.02567198 0.4049353 0.1928532)
    Marker lacr: torso (-0.01798349 0.4038311 -0.1963043)
    Marker c7: torso (-0.0561472 0.4400288 0.004909535)
    Marker jug: torso (0.09663939 0.3803229 0.01179382)
    Marker rlel: humerus_r (-0.005602788 -0.2692095 0.0262658)
    Marker rdr: radius_r (-0.01515495 -0.2622634 0.0524882)
    Marker llel: humerus_l (-0.006966866 -0.2723789 -0.02584478)
    Marker ldr: radius_l (-0.01538853 -0.2540943 -0.05071999)
    Marker s2: pelvis (-0.1720673 0.013139 -0.0004942002)
    Marker ric: pelvis (-0.0377162 0.06241133 0.1651913)
    Marker lic: pelvis (-0.03321197 0.0831613 -0.1702009)
    Marker rasi: pelvis (0.01593698 0.01583971 0.1375345)
    Marker lasi: pelvis (0.01418324 0.02176102 -0.1425134)
    Marker rpsi: pelvis (-0.157431 0.04522255 0.05346439)
    Marker lpsi: pelvis (-0.1559199 0.04665617 -0.05233436)
    Marker rgt: femur_r (0.01373074 0.003451591 0.1018799)
    Marker rth1: femur_r (0.03026723 -0.1164618 0.1136906)
    Marker rth2: femur_r (0.03698053 -0.1985087 0.1035476)
    Marker rth3: femur_r (0.03318096 -0.2875658 0.08495741)
    Marker rth4: femur_r (0.08340208 -0.1945882 0.07459568)
    Marker rlfc: femur_r (0.005174573 -0.4066175 0.06208182)
    Marker rmfc: femur_r (-0.03220621 -0.4277047 -0.03936133)
    Marker rsh1: tibia_r (-0.01727735 -0.1285471 0.1034965)
    Marker rsh2: tibia_r (-0.01455601 -0.212695 0.09551434)
    Marker rsh3: tibia_r (-0.02040083 -0.3013536 0.08093352)
    Marker rsh4: tibia_r (0.02368071 -0.2092093 0.0480046)
    Marker rlmal: tibia_r (-0.02727141 -0.4319563 0.05434262)
    Marker rmmal: tibia_r (-0.005404412 -0.4050408 -0.03054246)
    Marker rcal: calcn_r (-0.01419077 0.01404136 -0.01185642)
    Marker rtoe: calcn_r (0.2551844 0.02025128 -0.004682284)
    Marker rmt5: calcn_r (0.1539772 -0.01012492 0.07104174)
    Marker rmt1: calcn_r (0.1710675 -0.005368581 -0.04326373)
    Marker lgt: femur_l (0.002057862 -0.004606317 -0.1089909)
    Marker lth1: femur_l (-0.009480843 -0.1241558 -0.119693)
    Marker lth2: femur_l (0.005694038 -0.210257 -0.1076563)
    Marker lth3: femur_l (0.01118652 -0.2929785 -0.08684773)
    Marker lth4: femur_l (0.05886002 -0.2011275 -0.09817633)
    Marker llfc: femur_l (0.004483449 -0.406344 -0.05962924)
    Marker lmfc: femur_l (-0.02945503 -0.4338713 0.04564977)
    Marker lsh1: tibia_l (-0.03600778 -0.1245872 -0.0995626)
    Marker lsh2: tibia_l (-0.03560948 -0.2112749 -0.09134996)
    Marker lsh3: tibia_l (-0.0366939 -0.2971478 -0.07473707)
    Marker lsh4: tibia_l (0.01853795 -0.2085162 -0.05524404)
    Marker llmal: tibia_l (-0.02681857 -0.4288138 -0.04876416)
    Marker lmmal: tibia_l (-0.002750926 -0.4140431 0.03716626)
    Marker lcal: calcn_l (-0.0177348 0.01256301 0.005660456)
    Marker ltoe: calcn_l (0.2567888 0.01902769 0.002047432)
    Marker lmt5: calcn_l (0.1570497 -0.008087704 -0.06748681)
    Marker lmt1: calcn_l (0.1789176 -0.006926959 0.04574389)
