# OpenSim document version 40000
MarkerSet:
  Marker racr: torso (-0.02181604 0.4337209 0.1827133)
  Marker lacr: torso (-0.02342609 0.4328212 -0.1880022)
  Marker c7: torso (-0.07004562 0.4700947 -0.002891763)
  Marker jug: torso (0.05570029 0.3848526 -0.001755969)
  Marker rlel: humerus_r (-0.007612732 -0.3256129 0.02822565)
  Marker rdr: radius_r (-0.01644206 -0.284944 0.06000636)
  Marker llel: humerus_l (-0.01206631 -0.3281095 -0.01830286)
  Marker ldr: radius_l (-0.01573389 -0.2836289 -0.06578748)
  Marker s2: pelvis (-0.1796969 0.01142952 -0.0008641628)
  Marker ric: pelvis (-0.02741981 0.08667486 0.1472006)
  Marker lic: pelvis (-0.05577387 0.09183307 -0.1562532)
  Marker rasi: pelvis (0.01998726 0.02779971 0.1346632)
  Marker lasi: pelvis (0.01559463 0.02443364 -0.1302716)
  Marker rpsi: pelvis (-0.1622571 0.04698156 0.05305234)
  Marker lpsi: pelvis (-0.1587174 0.05232685 -0.06033488)
  Marker rgt: femur_r (0.002789487 0.0109759 0.1024447)
  Marker rth1: femur_r (0.00985128 -0.1177236 0.1026713)
  Marker rth2: femur_r (0.02983832 -0.2029709 0.09072105)
  Marker rth3: femur_r (0.006978696 -0.2855029 0.08497959)
  Marker rth4: femur_r (0.06435299 -0.2014162 0.07685623)
  Marker rlfc: femur_r (-0.002859787 -0.4266783 0.0508039)
  Marker rmfc: femur_r (-0.01115575 -0.4369482 -0.04497874)
  Marker rsh1: tibia_r (-0.0306513 -0.144477 0.07382599)
  Marker rsh2: tibia_r (-0.007197181 -0.228715 0.05203165)
  Marker rsh3: tibia_r (-0.02727508 -0.3129643 0.0506536)
  Marker rsh4: tibia_r (0.01043167 -0.2230669 0.0164868)
  Marker rlmal: tibia_r (-0.0259878 -0.4546284 0.03776489)
  Marker rmmal: tibia_r (0.00130607 -0.4380556 -0.04572262)
  Marker rcal: calcn_r (-0.02708283 0.006421026 -0.002147227)
  Marker rtoe: calcn_r (0.263214 0.02472618 0.003055007)
  Marker rmt5: calcn_r (0.1857099 -0.01994843 0.06850452)
  Marker rmt1: calcn_r (0.1832532 -0.009252665 -0.03998273)
  Marker lgt: femur_l (-0.001076474 0.003381659 -0.08791209)
  Marker lth1: femur_l (0.006845279 -0.114364 -0.09866096)
  Marker lth2: femur_l (0.02779235 -0.1993932 -0.08860654)
  Marker lth3: femur_l (0.002403841 -0.2841459 -0.07960707)
  Marker lth4: femur_l (0.0617939 -0.1988146 -0.07307443)
  Marker llfc: femur_l (-0.006728231 -0.4380687 -0.04809853)
  Marker lmfc: femur_l (-0.01606099 -0.4516989 0.03989889)
  Marker lsh1: tibia_l (-0.03358581 -0.149932 -0.07105117)
  Marker lsh2: tibia_l (-0.009608207 -0.2298656 -0.04837272)
  Marker lsh3: tibia_l (-0.02825012 -0.3191633 -0.05113727)
  Marker lsh4: tibia_l (-0.0002615251 -0.2249673 -0.008207505)
  Marker llmal: tibia_l (-0.02746919 -0.4554278 -0.03787036)
  Marker lmmal: tibia_l (0.004380388 -0.4301932 0.04300719)
  Marker lcal: calcn_l (-0.02876768 0.004016647 0.003348112)
  Marker ltoe: calcn_l (0.2593609 0.0204222 -0.003054869)
  Marker lmt5: calcn_l (0.1825996 -0.01637629 -0.06345026)
  Marker lmt1: calcn_l (0.1856125 -0.01049813 0.04252308)
