# OpenSim document version 40000
AnalyzeTool s10c0203:
  model_file: /Users/rosswilkinson/Google Drive/projects/grip-no-grip/results/s10modelScaled.osim
  replace_force_set: false
  results_directory: /Users/rosswilkinson/Google Drive/projects/grip-no-grip/results
  output_precision: 8
  initial_time: 0.005
  final_time: 10
  solve_for_equilibrium_for_auxiliary_states: false
  maximum_number_of_integrator_steps: 20000
  maximum_integrator_step_size: 1
  minimum_integrator_step_size: 1e-8
  integrator_error_tolerance: 1e-5
  coordinates_file: /Users/rosswilkinson/Google Drive/projects/grip-no-grip/results/s10c0203inverseKinematics.mot
  lowpass_cutoff_frequency_for_coodinates: -1
  lowpass_cutoff_frequency_for_coordinates: -1
  AnalysisSet Analyses:
    PointKinematics: on=false start_time=0.005 end_time=9.995 step_interval=1 in_degrees=true
        relative_to_body_name=ground point=([0 0 0])
    MuscleAnalysis: on=false start_time=0.005 end_time=9.995 step_interval=1 in_degrees=true muscle_list=all
        moment_arm_coordinate_list=all compute_moments=true
    BodyKinematics: start_time=0.005 end_time=10 step_interval=1 in_degrees=true bodies=center_of_mass
        express_results_in_body_local_frame=false
